OpenVSP model (file version 5), 5 components.
Geometry view with OpenVSP parameter names; values to 6 digits, angles in degrees, lengths in the model's unit.
Overall bounding box: X_Min=0 X_Len=129.146 Y_Min=-56.0325 Y_Len=112.065 Z_Min=-6.59624 Z_Len=40.0962

Fuselage "Fuselage"
  location (X Y Z) 0 0 0, rotation 0 0 0
  bounding box size 124.75 13.9428 13
  Design: Length=124.75
  cross sections:
    n  XLocPercent  YLocPercent  ZLocPercent  shape
    0  0            0            0            point
    1  0.0319488    0            0.00117095   ellipse Ellipse_Height=6.5 Ellipse_Width=5.5
    2  0.235143     0            0.0147758    ellipse Ellipse_Height=13 Ellipse_Width=12.3333
    3  0.642051     0            0.0147758    as above
    4  0.730978     0            0.0164431    ellipse Ellipse_Height=12.0702 Ellipse_Width=12.3333
    5  0.99         0            0.0467919    ellipse Ellipse_Height=4.5 Ellipse_Width=1.5
    6  1            0            0.0467919    point

Wing "Wing", child of "Fuselage"
  location (X Y Z) 45 0 -2.52717, rotation 0 0 0
  symmetric about XZ
  bounding box size 36.5725 112.065 7.45668
  totals: TotalSpan=112.583 TotalProjectedSpan=112.065 TotalChord=13.5009 TotalArea=1312.97 TotalAR=9.56503
  root: chord 24.9037, twist 4, airfoil file "BOEING 737 (a)"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 BaseThickChord=0.15373 ThickChord=0.15373
  sections:
    n  Span     Root_Chord  Tip_Chord  Area     Sweep  Sweep_Location  Dihedral  Twist  Twist_Location  tip airfoil
    1  18       24.9037     12.3       334.834  35     0               5.5       3      0.25            airfoil file "BOEING 737 (c)"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 BaseThickChord=0.100397 ThickChord=0.100397
    2  38.2917  12.3        4.5        321.65   27     0               5.5       0      0.25            airfoil file "BOEING 737 (d)"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 BaseThickChord=0.108179 ThickChord=0.108179

Custom "Duct", child of "Wing"
  location (X Y Z) 49.881 15.8333 -3.47955, rotation 5.5 3.5 0; relative location 4.88095 15.8333 -0.952381, rotation 5.5 3.5 0
  symmetric about XZ
  bounding box size 10.7929 38.5118 6.49003
  Design: Camber=0 CamberLoc=0.341667 Chord=10.5 Height=5.04221 InvertFlag=0 Shape=-0.25 ThickChord=0.12 Width=5.5005
  custom script Duct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

Wing "Horz", child of "Fuselage"
  location (X Y Z) 108 0 5.57745, rotation 0 0 0
  symmetric about XZ
  bounding box size 21.1461 47.0833 5.04174
  totals: TotalSpan=47.546 TotalProjectedSpan=47.0833 TotalChord=9 TotalArea=427.914 TotalAR=5.18057
  root: chord 13.5, twist 0, NACA 4-series Camber=0 CamberLoc=0.2 ThickChord=0.2
  sections:
    n  Span    Root_Chord  Tip_Chord  Area     Sweep  Sweep_Location  Dihedral  Twist  Twist_Location  tip airfoil
    1  23.773  13.5        4.5        213.957  35     0               8         0      0.25            NACA 4-series Camber=0 CamberLoc=0.2 ThickChord=0.17

Wing "Vert", child of "Fuselage"
  location (X Y Z) 90.5 0 6.5, rotation 90 0 0
  bounding box size 36.239 2.4409 27
  totals: TotalSpan=27 TotalProjectedSpan=27 TotalChord=16.2022 TotalArea=346.151 TotalAR=2.10601
  root: chord 30.5, twist 0, NACA 4-series Camber=0 CamberLoc=0.2 ThickChord=0.08
  sections:
    n  Span  Root_Chord  Tip_Chord  Area     Sweep  Sweep_Location  Dihedral  Twist  Twist_Location  tip airfoil
    1  6.5   30.5        14.9485    147.708  69     0               0         0      0.25            NACA 4-series Camber=0 CamberLoc=0.2 ThickChord=0.15
    2  20.5  14.9485     4.41183    198.444  36     0               0         0      0.25            NACA 4-series Camber=0 CamberLoc=0.2 ThickChord=0.3

VSPAERO settings: Sref=1312.97 bref=112.583 cref=13.5009 Xcg=0 Ycg=0 Zcg=0 AlphaStart=0 AlphaEnd=10 AlphaNpts=1 BetaStart=0 BetaEnd=0 BetaNpts=1 MachStart=0.75 MachEnd=0 MachNpts=1 ReCref=1e+07 Vinf=100 Rho=0.002377
