OpenVSP model (file version 5), 12 components.
Geometry view with OpenVSP parameter names; values to 6 digits, angles in degrees, lengths in the model's unit.
Overall bounding box: X_Min=-1 X_Len=6.7682 Y_Min=-9 Y_Len=19 Z_Min=-0.383333 Z_Len=0.583449

Blank "Wing_Parent"
  location (X Y Z) 0 0 0, rotation 0 0 0

Wing "Wing", child of "Wing_Parent"
  location (X Y Z) -1 0 0, rotation 0 0 0
  symmetric about XZ
  bounding box size 6.19615 18 0.400232
  totals: TotalSpan=18 TotalProjectedSpan=18 TotalChord=2.5 TotalArea=45 TotalAR=7.2
  root: chord 4, twist 0, NACA 4-series Camber=0 CamberLoc=0.2 ThickChord=0.1
  sections:
    n  Span  Root_Chord  Tip_Chord  Area  Sweep  Sweep_Location  Dihedral  Twist  Twist_Location  tip airfoil
    1  9     4           1          22.5  30     0               0         0      0.25            as above

Blank "Wing_CG", child of "Wing"
  location (X Y Z) 1.938 0 0, rotation 0 0 0; relative location 2.938 0 0, rotation 0 0 0

Blank "Wing_Probe", child of "Wing"
  location (X Y Z) 2.63019 4.05738 0.118407, rotation 0.364342 2.93189 67.4214; relative location 0 0 0, rotation 0 0 0

Blank "Rot1", child of "Wing"
  location (X Y Z) 4.69085 9 -1.32868e-07, rotation 0 0 0; relative location 0 0 0, rotation 0 0 0

Blank "Rot2", child of "Rot1"
  location (X Y Z) 4.69085 9 -1.32868e-07, rotation 0 0 0; relative location 0 0 0, rotation 0 0 0

Wing "Control", child of "Rot2"
  location (X Y Z) 4.19085 9 -1.32868e-07, rotation 0 0 0; relative location -0.5 0 0, rotation 0 0 0
  bounding box size 1.57735 1 0.100058
  totals: TotalSpan=1 TotalProjectedSpan=1 TotalChord=1 TotalArea=1 TotalAR=1
  root: chord 1, twist 0, NACA 4-series Camber=0 CamberLoc=0.2 ThickChord=0.1
  sections:
    n  Span  Root_Chord  Tip_Chord  Area  Sweep  Sweep_Location  Dihedral  Twist  Twist_Location  tip airfoil
    1  1     1           1          1     30     0               0         0      0.25            as above

Blank "Pod_Control", child of "Wing"
  location (X Y Z) 3.34203 1.40165 0, rotation 178.366 6.66632 -76.1917; relative location 0 0 0, rotation 0 0 0

Pod "PodGeom", child of "Pod_Control"
  location (X Y Z) 3.34203 1.40165 -0.25, rotation 0 0 0; relative location 0 -0.0298733 0.248209, rotation -173.137 0 -76.2868
  symmetric about XZ
  bounding box size 2 3.06996 0.266667
  Design: FineRatio=15 Length=2

Blank "Pod_Probe", child of "PodGeom"
  location (X Y Z) 5.34202 1.40165 -0.25, rotation 0 0 0; relative location 0 0 0, rotation 0 0 0

Blank "Imported_Origin", child of "Wing_Parent"
  location (X Y Z) -4 0 -6, rotation 0 0 0

Mesh "MeshGeom", child of "Imported_Origin"
  location (X Y Z) 0 0 0, rotation 0 0 0; relative location 4 0 6, rotation 0 0 0
  triangle mesh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
