OpenVSP model (file version 5), 3 components.
Geometry view with OpenVSP parameter names; values to 6 digits, angles in degrees, lengths in the model's unit.
Overall bounding box: X_Min=0 X_Len=3.34426 Y_Min=-5.73864 Y_Len=11.4773 Z_Min=-1.73864 Z_Len=3.47727

Stack "ClosedStack_Point"
  location (X Y Z) 0 4 0, rotation 0 0 0
  bounding box size 3.34426 3.47727 3.47727
  cross sections:
    n  XDelta    YDelta  ZDelta  shape
    0  0         0       0       point
    1  0.5       0       0       circle Circle_Diameter=1.3325
    2  2         0       0       circle Circle_Diameter=3.47727
    3  0.344262  0       0       circle Circle_Diameter=2.75
    4  0.5       0       0       point

Stack "ClosedStack_Line"
  location (X Y Z) 0 0 0, rotation 0 0 0
  bounding box size 3.34426 3.47727 3.47727
  cross sections:
    n  XDelta    YDelta  ZDelta  shape
    0  0         0       0       point
    1  0.5       0       0       circle Circle_Diameter=1.3325
    2  2         0       0       circle Circle_Diameter=3.47727
    3  0.344262  0       0       circle Circle_Diameter=2.75
    4  0.5       0       0       ellipse Ellipse_Height=1.27273 Ellipse_Width=0

Stack "OpenStack"
  location (X Y Z) 0 -4 0, rotation 0 0 0
  bounding box size 3.34426 3.47727 3.47727
  mass: Density=1 Shell_Flag=1 Mass_Area=1 Mass_Prior=0
  cross sections:
    n  XDelta    YDelta  ZDelta  shape
    0  0         0       0       circle Circle_Diameter=0.954545
    1  0.5       0       0       circle Circle_Diameter=1.3325
    2  2         0       0       circle Circle_Diameter=3.47727
    3  0.344262  0       0       circle Circle_Diameter=2.75
    4  0.5       0       0       circle Circle_Diameter=1.54545
