OpenVSP model (file version 5), 5 components.
Geometry view with OpenVSP parameter names; values to 6 digits, angles in degrees, lengths in the model's unit.
Overall bounding box: X_Min=0 X_Len=10.4997 Y_Min=-9 Y_Len=18 Z_Min=-1 Z_Len=2

Wing "Wing"
  location (X Y Z) 1.52174 0 0, rotation 0 0 0
  symmetric about XZ
  bounding box size 6.19615 18 0.400232
  totals: TotalSpan=18 TotalProjectedSpan=18 TotalChord=2.5 TotalArea=45 TotalAR=7.2
  root: chord 4, twist 0, NACA 4-series Camber=0 CamberLoc=0.2 ThickChord=0.1
  sections:
    n  Span  Root_Chord  Tip_Chord  Area  Sweep  Sweep_Location  Dihedral  Twist  Twist_Location  tip airfoil
    1  9     4           1          22.5  30     0               0         0      0.25            as above

Conformal "Wing_conform", child of "Wing"
  location (X Y Z) 1.52174 0 0, rotation 0 0 0; relative location 0 0 0, rotation 0 0 0
  symmetric about XZ
  bounding box size 3.26192 13.4594 0.212352
  Design: ChordTrimFlag=1 ChordTrimMax=0.9 ChordTrimMin=0.133333 Offset=0.0425 UTrimFlag=1 UTrimMax=0.749925 UTrimMin=0.341633 V1TrimBegin=0.933015 V1TrimEnd=0.0669848 V1TrimFlag=1 V2TrimBegin=0.445507 V2TrimEnd=0.554493 V2TrimFlag=1

Pod "Pod"
  location (X Y Z) 0 0 0, rotation 0 0 0
  bounding box size 10 2 2
  Design: FineRatio=10 Length=10

Conformal "Pod_conform", child of "Pod"
  location (X Y Z) 0 0 0, rotation 0 0 0
  bounding box size 6.72325 1.77 1.77
  Design: ChordTrimFlag=0 ChordTrimMax=0.9 ChordTrimMin=0.1 Offset=0.115 UTrimFlag=1 UTrimMax=0.791587 UTrimMin=0.224977 V1TrimBegin=0.75 V1TrimEnd=0.916667 V1TrimFlag=0 V2TrimBegin=0.0833333 V2TrimEnd=0.25 V2TrimFlag=0

Conformal "Pod_conform_outside", child of "Pod"
  location (X Y Z) 0 0 0, rotation 0 0 0
  bounding box size 1.74719 1.37876 1.37876
  Design: ChordTrimFlag=0 ChordTrimMax=0.9 ChordTrimMin=0.1 Offset=-0.5 UTrimFlag=1 UTrimMax=0.9999 UTrimMin=0.808253 V1TrimBegin=0.3 V1TrimEnd=1 V1TrimFlag=0 V2TrimBegin=0.25 V2TrimEnd=0.75 V2TrimFlag=0
