OpenVSP model (file version 5), 1 components.
Geometry view with OpenVSP parameter names; values to 6 digits, angles in degrees, lengths in the model's unit.
Overall bounding box: X_Min=-11.8125 X_Len=43.294 Y_Min=-31.779 Y_Len=42.6683 Z_Min=-8.96928 Z_Len=17.0654

Fuselage "FuselageGeom"
  location (X Y Z) 0 0 0, rotation 0 0 0
  bounding box size 43.294 42.6683 17.0654
  Design: Length=20
  cross sections:
    n  XLocPercent  XRotate  YLocPercent  ZLocPercent  ZRotate  shape
    0  1            0        0            0            135      ellipse Ellipse_Height=8 Ellipse_Width=4
    1  0            45       0            0            -135     super ellipse Super_Height=4 Super_M=0.396364 Super_MaxWidthLoc=-0.436364 Super_N=0.963636 Super_Width=6.68182
    2  0            0        -1           0            -45      NACA 4-series Camber=0.0380455 CamberLoc=0.2 Chord=6.55455 ThickChord=0.2
    3  1            -45      -1           0            45       wedge Chord=4 ThickChord=1 ThickLoc=0.5
    4  1            0        0            0            135      ellipse Ellipse_Height=8 Ellipse_Width=4
