OpenVSP model (file version 5), 4 components.
Geometry view with OpenVSP parameter names; values to 6 digits, angles in degrees, lengths in the model's unit.
Overall bounding box: X_Min=0 X_Len=10 Y_Min=-9 Y_Len=18 Z_Min=-1.33333 Z_Len=2

Wing "WingGeom"
  location (X Y Z) 3 0 0, rotation 0 0 0
  symmetric about XZ
  bounding box size 6.18164 18 0.780466
  totals: TotalSpan=18 TotalProjectedSpan=18 TotalChord=2.5 TotalArea=45 TotalAR=7.2
  root: chord 4, twist 10, NACA 4-series Camber=0 CamberLoc=0.2 ThickChord=0.1
  sections:
    n  Span  Root_Chord  Tip_Chord  Area    Sweep  Sweep_Location  Dihedral  Twist  Twist_Location  tip airfoil
    1  4.5   4           2.5        14.625  30     0               0         0      0.25            as above
    2  4.5   2.5         1          7.875   30     0               0         0      0.25            as above

Pod "PodGeom", child of "WingGeom"
  location (X Y Z) 0 0 0, rotation 0 0 0; relative location -3 0 0, rotation 0 0 0
  bounding box size 10 1.33333 1.33333
  Design: FineRatio=15 Length=10

Pod "PodGeom", child of "PodGeom"
  location (X Y Z) 0 0 0, rotation 0 0 0
  symmetric about XZ
  bounding box size 2.375 0.316667 0.316667
  Design: FineRatio=15 Length=2.375

Pod "PodGeom", child of "WingGeom"
  location (X Y Z) 3.59808 4.5 -1, rotation 0 0 0; relative location -2 0 -1, rotation 0 0 0
  symmetric about XZ
  bounding box size 5 9.66667 0.666667
  Design: FineRatio=15 Length=5
