OpenVSP model (file version 5), 6 components.
Geometry view with OpenVSP parameter names; values to 6 digits, angles in degrees, lengths in the model's unit.
Overall bounding box: X_Min=0 X_Len=12.7303 Y_Min=-0.410752 Y_Len=14.8101 Z_Min=-8.39933 Z_Len=12.7987

Blank "Origin"
  location (X Y Z) 0 0 0, rotation 0 0 0

Pod "Pod1", child of "Origin"
  location (X Y Z) 3.33333 4 0, rotation 0 -20 0
  bounding box size 9.39693 1.33333 3.86126
  Design: FineRatio=15 Length=10

Pod "Pod2", child of "Pod1"
  location (X Y Z) 1.90476 7 -1, rotation 0 0 0; relative location -1.42857 3 -1, rotation 0 0 0
  symmetric about XZ
  bounding box size 10 7.33333 1.33333
  Design: FineRatio=15 Length=10

Wing "Blades", child of "Pod2"
  location (X Y Z) 3.15476 7.4 -1.25, rotation 0 -90 0; relative location 1 0.4 0, rotation 0 -90 0
  10 copies around X
  bounding box size 0.384465 2.8 2.76933
  totals: TotalSpan=2 TotalProjectedSpan=2 TotalChord=0.35 TotalArea=0.7 TotalAR=5.71429
  root: chord 0.5, twist 50, NACA 4-series Camber=0 CamberLoc=0.2 ThickChord=0.1
  sections:
    n  Span  Root_Chord  Tip_Chord  Area  Sweep  Sweep_Location  Dihedral  Twist  Twist_Location  tip airfoil
    1  1     0.5         0.2        0.35  0      0.25            0         20     0.25            as above

Propeller "PropGeom", child of "Pod2"
  location (X Y Z) 2.90476 7 -1, rotation 0 0 0; relative location 1 0 0, rotation 0 0 0
  symmetric about XZ
  bounding box size 0.270048 8.8215 2.72472
  Design: Diameter=2.8 NumBlade=10 Beta34=20 UseBeta34Flag=1 Feather=-10.5 Rotate=0 ReverseFlag=0 FoldAngle=0 PropMode=0 AF=137.117 CLi=0.534924 Chord=0.215 Solidity=0.684366 ConstructXoC=0.5 FeatherAxisXoC=0.5 FeatherOffsetXoC=0
  cross sections:
    n  RadiusFrac  shape
    0  0.285714    NACA 4-series Camber=0 CamberLoc=0.2 Chord=0.42 ThickChord=0.12
    1  1           NACA 4-series Camber=0.0129936 CamberLoc=0.2 Chord=0.182 ThickChord=0.12
  Chord along r/R (linear): 0.285714: 0.3, 1: 0.13
  Twist along r/R (linear): 0.285714: 50, 1: 20
  Thick along r/R (linear): 0.285714: 0.12, 1: 0.12
  CLI along r/R (cubic Bezier): 0.285714: 0, 0.32381: 0.7, 0.361905: 0.7, 0.4: 0.7, 0.466667: 0.7, 0.533333: 0.7, 0.6: 0.7, 0.733333: 0.7, 0.866667: 0.7, 1: 0.2

Wing "WingGeom", child of "Pod2"
  location (X Y Z) 4.90476 8 -2, rotation 45 0 0; relative location 3 1 -1, rotation 45 0 0
  symmetric about XZ
  2 copies around X
  bounding box size 6.19615 12.7987 12.7987
  totals: TotalSpan=18 TotalProjectedSpan=18 TotalChord=2.5 TotalArea=45 TotalAR=7.2
  root: chord 4, twist 0, NACA 4-series Camber=0 CamberLoc=0.2 ThickChord=0.1
  sections:
    n  Span  Root_Chord  Tip_Chord  Area  Sweep  Sweep_Location  Dihedral  Twist  Twist_Location  tip airfoil
    1  9     4           1          22.5  30     0               0         0      0.25            as above
