OpenVSP model (file version 5), 5 components.
Geometry view with OpenVSP parameter names; values to 6 digits, angles in degrees, lengths in the model's unit.
Overall bounding box: X_Min=0 X_Len=10 Y_Min=-9 Y_Len=18 Z_Min=-2.24637 Z_Len=4.49274

Wing "WingGeom"
  location (X Y Z) 3 0 0, rotation 0 0 0
  symmetric about XZ
  bounding box size 6.18164 18 0.780466
  totals: TotalSpan=18 TotalProjectedSpan=18 TotalChord=2.5 TotalArea=45 TotalAR=7.2
  root: chord 4, twist 10, NACA 4-series Camber=0 CamberLoc=0.2 ThickChord=0.1
  sections:
    n  Span  Root_Chord  Tip_Chord  Area    Sweep  Sweep_Location  Dihedral  Twist  Twist_Location  tip airfoil
    1  4.5   4           2.5        14.625  30     0               0         0      0.25            as above
    2  4.5   2.5         1          7.875   30     0               0         0      0.25            as above

Pod "PodGeom", child of "WingGeom"
  location (X Y Z) 0 0 0, rotation 0 0 0
  bounding box size 10 1.33333 1.33333
  Design: FineRatio=15 Length=10

Propeller "PropGeom", child of "WingGeom"
  location (X Y Z) 1 0 0, rotation 0 0 0
  bounding box size 0.248495 3.92635 4.49274
  Design: Diameter=5 NumBlade=3 Beta34=20 UseBeta34Flag=1 Feather=0 Rotate=0 ReverseFlag=0 FoldAngle=0 PropMode=0 AF=151.538 CLi=0.538798 Chord=0.177656 Solidity=0.169649 ConstructXoC=0.5 FeatherAxisXoC=0.5 FeatherOffsetXoC=0
  cross sections:
    n  RadiusFrac  shape
    0  0.2         ellipse Ellipse_Height=0.1 Ellipse_Width=0.2
    1  0.4         NACA 16-series Chord=0.415625 IdealCl=0.7 ThickChord=0.144074
    2  1           NACA 16-series Chord=0.325 IdealCl=0.2 ThickChord=0.03
  Chord along r/R (cubic Bezier): 0.2: 0.08, 0.333333: 0.15, 0.466667: 0.2, 0.6: 0.2, 0.716667: 0.2, 0.833333: 0.2, 0.95: 0.2, 0.966667: 0.2, 0.983333: 0.2, 1: 0.13
  Twist along r/R (PCHIP): 0.2: 46.75, 0.75: 20, 1: 13
  Thick along r/R (cubic Bezier): 0.2: 0.5, 0.233333: 0.3, 0.266667: 0.225, 0.3: 0.2, 0.4: 0.125, 0.5: 0.115, 0.6: 0.1, 0.733333: 0.075, 0.866667: 0.055, 1: 0.03
  CLI along r/R (cubic Bezier): 0.2: 0, 0.266667: 0.7, 0.333333: 0.7, 0.4: 0.7, 0.466667: 0.7, 0.533333: 0.7, 0.6: 0.7, 0.733333: 0.7, 0.866667: 0.7, 1: 0.2

Pod "PodGeom", child of "WingGeom"
  location (X Y Z) 3 3.80952 0, rotation 0 0 0
  bounding box size 5 0.666667 0.666667
  Design: FineRatio=15 Length=5

Propeller "PropGeom", child of "PodGeom"
  location (X Y Z) 3.5 3.80952 0, rotation 0 0 0; relative location 0.5 0 0, rotation 0 0 0
  bounding box size 0.149097 2.35581 2.69564
  Design: Diameter=3 NumBlade=3 Beta34=20 UseBeta34Flag=1 Feather=0 Rotate=0 ReverseFlag=0 FoldAngle=0 PropMode=0 AF=151.538 CLi=0.538798 Chord=0.177656 Solidity=0.169649 ConstructXoC=0.5 FeatherAxisXoC=0.5 FeatherOffsetXoC=0
  cross sections:
    n  RadiusFrac  shape
    0  0.2         ellipse Ellipse_Height=0.06 Ellipse_Width=0.12
    1  0.4         NACA 16-series Chord=0.249375 IdealCl=0.7 ThickChord=0.144074
    2  1           NACA 16-series Chord=0.195 IdealCl=0.2 ThickChord=0.03
  blade curves as in "PropGeom"
