OpenVSP model (file version 5), 10 components.
Geometry view with OpenVSP parameter names; values to 6 digits, angles in degrees, lengths in the model's unit.
Overall bounding box: X_Min=0 X_Len=3.37169 Y_Min=-0.25021 Y_Len=1.01025 Z_Min=-0.72444 Z_Len=0.934344

Hinge "HingeGeom"
  location (X Y Z) 0 0 0, rotation 0 0 0
  Hinge: JointRotMax=360 JointRotMaxFlag=0 JointRotMin=-360 JointRotMinFlag=0 JointRotate=0 JointRotateFlag=1 JointTransMax=1000 JointTransMaxFlag=0 JointTransMin=-1000 JointTransMinFlag=0 JointTranslate=0 JointTranslateFlag=0 OrientRotFlag=0 PrimOffAbsRelFlag=1 PrimType=0 PrimULoc=0 PrimVecAbsRelFlag=1 PrimWLoc=0 PrimXOff=0 PrimXOffRel=0 PrimXVec=1 PrimXVecRel=1 PrimYOff=0 PrimYOffRel=0 PrimYVec=0 PrimYVecRel=0 PrimZOff=0 PrimZOffRel=0 PrimZVec=0 PrimZVecRel=0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

Fuselage "Pipe", child of "HingeGeom"
  location (X Y Z) 0 0 0, rotation 0 0 0
  bounding box size 1 0.1 0.1
  Design: Length=1
  cross sections:
    n  XLocPercent  YLocPercent  ZLocPercent  shape
    0  0            0            0            point
    1  0            0            0            circle Circle_Diameter=0.1
    2  1            0            0            as above
    3  1            0            0            point

Hinge "HingeGeom", child of "Pipe"
  location (X Y Z) 1 1.5e-07 0, rotation 0 0 0; relative location 0 0 0, rotation 0 0 0
  Hinge: JointRotMax=360 JointRotMaxFlag=0 JointRotMin=-360 JointRotMinFlag=0 JointRotate=42.4107 JointRotateFlag=1 JointTransMax=1000 JointTransMaxFlag=0 JointTransMin=-1000 JointTransMinFlag=0 JointTranslate=0 JointTranslateFlag=0 OrientRotFlag=0 PrimOffAbsRelFlag=1 PrimType=0 PrimULoc=0 PrimVecAbsRelFlag=1 PrimWLoc=0 PrimXOff=0 PrimXOffRel=0 PrimXVec=0 PrimXVecRel=0 PrimYOff=0 PrimYOffRel=0 PrimYVec=1 PrimYVecRel=1 PrimZOff=0 PrimZOffRel=0 PrimZVec=0 PrimZVecRel=0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

Fuselage "Pipe", child of "HingeGeom"
  location (X Y Z) 1 1.5e-07 0, rotation 0 42.4107 0; relative location 0 0 0, rotation 0 0 0
  bounding box size 0.805773 0.1 0.748273
  Design: Length=1
  cross sections:
    n  XLocPercent  YLocPercent  ZLocPercent  shape
    0  0            0            0            point
    1  0            0            0            circle Circle_Diameter=0.1
    2  1            0            0            as above
    3  1            0            0            point

Hinge "HingeGeom", child of "Pipe"
  location (X Y Z) 1.73833 3e-07 -0.67444, rotation 0 0 0; relative location 0 0 0, rotation 0 0 0
  Hinge: JointRotMax=360 JointRotMaxFlag=0 JointRotMin=-360 JointRotMinFlag=0 JointRotate=45.2381 JointRotateFlag=1 JointTransMax=1000 JointTransMaxFlag=0 JointTransMin=-1000 JointTransMinFlag=0 JointTranslate=0 JointTranslateFlag=0 OrientRotFlag=0 PrimOffAbsRelFlag=1 PrimType=0 PrimULoc=0 PrimVecAbsRelFlag=1 PrimWLoc=0 PrimXOff=0 PrimXOffRel=0 PrimXVec=0 PrimXVecRel=0 PrimYOff=0 PrimYOffRel=0 PrimYVec=0 PrimYVecRel=0 PrimZOff=0 PrimZOffRel=0 PrimZVec=1 PrimZVecRel=1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

Fuselage "Pipe", child of "HingeGeom"
  location (X Y Z) 1.73833 3e-07 -0.67444, rotation 0 0 45.2381; relative location 0 0 0, rotation 0 0 0
  bounding box size 0.775166 0.780455 0.1
  Design: Length=1
  cross sections:
    n  XLocPercent  YLocPercent  ZLocPercent  shape
    0  0            0            0            point
    1  0            0            0            circle Circle_Diameter=0.1
    2  1            0            0            as above
    3  1            0            0            point

Hinge "HingeGeom", child of "Pipe"
  location (X Y Z) 2.44249 0.710039 -0.67444, rotation 0 0 0; relative location 0 0 0, rotation 0 0 0
  Hinge: JointRotMax=360 JointRotMaxFlag=0 JointRotMin=-360 JointRotMinFlag=0 JointRotate=-56.5476 JointRotateFlag=1 JointTransMax=1000 JointTransMaxFlag=0 JointTransMin=-1000 JointTransMinFlag=0 JointTranslate=0 JointTranslateFlag=0 OrientRotFlag=0 PrimOffAbsRelFlag=1 PrimType=0 PrimULoc=0 PrimVecAbsRelFlag=1 PrimWLoc=0 PrimXOff=0 PrimXOffRel=0 PrimXVec=0 PrimXVecRel=0 PrimYOff=0 PrimYOffRel=0 PrimYVec=1 PrimYVecRel=1 PrimZOff=0 PrimZOffRel=0 PrimZVec=0 PrimZVecRel=0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

Fuselage "Pipe", child of "HingeGeom"
  location (X Y Z) 2.44249 0.710039 -0.67444, rotation 0 -56.5476 0; relative location 0 0 0, rotation 0 0 0
  bounding box size 0.634678 0.1 0.889469
  Design: Length=1
  cross sections:
    n  XLocPercent  YLocPercent  ZLocPercent  shape
    0  0            0            0            point
    1  0            0            0            circle Circle_Diameter=0.1
    2  1            0            0            as above
    3  1            0            0            point

Hinge "HingeGeom", child of "Pipe"
  location (X Y Z) 2.99374 0.71004 0.159904, rotation 0 0 0; relative location 0 0 0, rotation 0 0 0
  Hinge: JointRotMax=360 JointRotMaxFlag=0 JointRotMin=-360 JointRotMinFlag=0 JointRotate=-70.6845 JointRotateFlag=1 JointTransMax=1000 JointTransMaxFlag=0 JointTransMin=-1000 JointTransMinFlag=0 JointTranslate=0 JointTranslateFlag=0 OrientRotFlag=0 PrimOffAbsRelFlag=1 PrimType=0 PrimULoc=0 PrimVecAbsRelFlag=1 PrimWLoc=0 PrimXOff=0 PrimXOffRel=0 PrimXVec=0 PrimXVecRel=0 PrimYOff=0 PrimYOffRel=0 PrimYVec=0 PrimYVecRel=0 PrimZOff=0 PrimZOffRel=0 PrimZVec=1 PrimZVecRel=1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

Fuselage "Pipe", child of "HingeGeom"
  location (X Y Z) 2.99374 0.71004 0.159904, rotation 0 0 -70.6845; relative location 0 0 0, rotation 0 0 0
  bounding box size 0.42514 0.976789 0.1
  Design: Length=1
  cross sections:
    n  XLocPercent  YLocPercent  ZLocPercent  shape
    0  0            0            0            point
    1  0            0            0            circle Circle_Diameter=0.1
    2  1            0            0            as above
    3  1            0            0            point
