OpenVSP model (file version 5), 5 components.
Geometry view with OpenVSP parameter names; values to 6 digits, angles in degrees, lengths in the model's unit.
Overall bounding box: X_Min=0 X_Len=6.16285 Y_Min=-9 Y_Len=18 Z_Min=-0.200116 Z_Len=0.400232

Wing "Wing_1"
  location (X Y Z) 0 0 0, rotation 0 0 0
  symmetric about XZ
  bounding box size 4.73205 6 0.400232
  totals: TotalSpan=6 TotalProjectedSpan=6 TotalChord=3.5 TotalArea=21 TotalAR=1.71429
  root: chord 4, twist 0, NACA 4-series Camber=0 CamberLoc=0.2 ThickChord=0.1
  sections:
    n  Span  Root_Chord  Tip_Chord  Area  Sweep  Sweep_Location  Dihedral  Twist  Twist_Location  tip airfoil
    1  3     4           3          10.5  30     0               0         0      0.25            as above

Hinge "Hinge_1", child of "Wing_1"
  location (X Y Z) 3.21615 3 0.0158999, rotation 0 0 0; relative location 0.0159003 0 0, rotation 90 90 0
  Hinge: JointRotMax=175 JointRotMaxFlag=1 JointRotMin=0 JointRotMinFlag=1 JointRotate=0 JointRotateFlag=1 JointTransMax=1000 JointTransMaxFlag=0 JointTransMin=-1000 JointTransMinFlag=0 JointTranslate=0 JointTranslateFlag=0 OrientRotFlag=0 PrimOffAbsRelFlag=1 PrimType=0 PrimULoc=0 PrimVecAbsRelFlag=1 PrimWLoc=0 PrimXOff=0 PrimXOffRel=0 PrimXVec=1 PrimXVecRel=0 PrimYOff=0 PrimYOffRel=0 PrimYVec=0 PrimYVecRel=1 PrimZOff=0 PrimZOffRel=0 PrimZVec=0 PrimZVecRel=0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

Wing "Wing_2", child of "Hinge_1"
  location (X Y Z) 1.71615 3 0.0158999, rotation 0 0 0; relative location -1.5 0 0, rotation 0 0 0
  symmetric about XZ
  bounding box size 3.73205 12 0.300174
  totals: TotalSpan=6 TotalProjectedSpan=6 TotalChord=2.5 TotalArea=15 TotalAR=2.4
  root: chord 3, twist 0, NACA 4-series Camber=0 CamberLoc=0.2 ThickChord=0.1
  sections:
    n  Span  Root_Chord  Tip_Chord  Area  Sweep  Sweep_Location  Dihedral  Twist  Twist_Location  tip airfoil
    1  3     3           2          7.5   30     0               0         0      0.25            as above

Hinge "Hinge_2", child of "Wing_2"
  location (X Y Z) 4.4376 6 0.0271496, rotation 0 0 0; relative location 0.01125 0 0, rotation 90 90 0
  Hinge: JointRotMax=360 JointRotMaxFlag=0 JointRotMin=-360 JointRotMinFlag=0 JointRotate=0 JointRotateFlag=1 JointTransMax=0.493197 JointTransMaxFlag=1 JointTransMin=0 JointTransMinFlag=1 JointTranslate=0.493197 JointTranslateFlag=1 OrientRotFlag=0 PrimOffAbsRelFlag=1 PrimType=0 PrimULoc=0 PrimVecAbsRelFlag=1 PrimWLoc=0 PrimXOff=0 PrimXOffRel=0 PrimXVec=1 PrimXVecRel=0 PrimYOff=0 PrimYOffRel=0 PrimYVec=0 PrimYVecRel=1 PrimZOff=0 PrimZOffRel=0 PrimZVec=0 PrimZVecRel=0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

Wing "Wing_3", child of "Hinge_2"
  location (X Y Z) 3.4308 6 0.0271496, rotation 0 0 0; relative location -1.5 0 0, rotation 0 0 0
  symmetric about XZ
  bounding box size 2.73205 18 0.250145
  totals: TotalSpan=6 TotalProjectedSpan=6 TotalChord=1.75 TotalArea=10.5 TotalAR=3.42857
  root: chord 2.5, twist 0, NACA 4-series Camber=0 CamberLoc=0.2 ThickChord=0.1
  sections:
    n  Span  Root_Chord  Tip_Chord  Area  Sweep  Sweep_Location  Dihedral  Twist  Twist_Location  tip airfoil
    1  3     2.5         1          5.25  30     0               0         0      0.25            as above
