OpenVSP model (file version 5), 3 components.
Geometry view with OpenVSP parameter names; values to 6 digits, angles in degrees, lengths in the model's unit.
Overall bounding box: X_Min=0 X_Len=6.19615 Y_Min=-9 Y_Len=18 Z_Min=-0.520945 Z_Len=0.780563

Wing "Wing"
  location (X Y Z) 0 0 0, rotation 0 0 0
  symmetric about XZ
  bounding box size 6.18164 18 0.780563
  totals: TotalSpan=18 TotalProjectedSpan=18 TotalChord=2.5 TotalArea=45 TotalAR=7.2
  root: chord 4, twist 10, NACA 4-series Camber=0 CamberLoc=0.2 ThickChord=0.1
  sections:
    n  Span  Root_Chord  Tip_Chord  Area  Sweep  Sweep_Location  Dihedral  Twist  Twist_Location  tip airfoil
    1  9     4           1          22.5  30     0               0         0      0.25            as above

Hinge "Hinge", child of "Wing"
  location (X Y Z) 5.07529 4.5 -0.260472, rotation 0 -13.0825 75.6558; relative location 0 0 0, rotation 0 -13.0825 75.6558
  Hinge: JointRotMax=360 JointRotMaxFlag=0 JointRotMin=-360 JointRotMinFlag=0 JointRotate=0 JointRotateFlag=1 JointTransMax=1000 JointTransMaxFlag=0 JointTransMin=-1000 JointTransMinFlag=0 JointTranslate=0 JointTranslateFlag=0 OrientRotFlag=1 PrimOffAbsRelFlag=1 PrimType=3 PrimULoc=0.5 PrimVecAbsRelFlag=1 PrimWLoc=0 PrimXOff=0 PrimXOffRel=0 PrimXVec=0.241316 PrimXVecRel=0.241316 PrimYOff=0 PrimYOffRel=0 PrimYVec=0.968825 PrimYVecRel=0.968825 PrimZOff=0 PrimZOffRel=0 PrimZVec=0.0560782 PrimZVecRel=0.0560782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

Fuselage "Pipe", child of "Hinge"
  location (X Y Z) 5.07529 4.5 -0.260472, rotation 0 -13.0825 75.6558; relative location 0 0 0, rotation 0 0 0
  bounding box size 0.34193 0.9936 0.159534
  Design: Length=1
  cross sections:
    n  XLocPercent  YLocPercent  ZLocPercent  shape
    0  0            0            0            point
    1  0            0            0            circle Circle_Diameter=0.1
    2  1            0            0            as above
    3  1            0            0            point
