OpenVSP model (file version 5), 1 components.
Geometry view with OpenVSP parameter names; values to 6 digits, angles in degrees, lengths in the model's unit.
Overall bounding box: X_Min=0 X_Len=4.5 Y_Min=-1.5 Y_Len=3 Z_Min=-1.42544 Z_Len=2.85088

Stack "StackGeom"
  location (X Y Z) 0 0 0, rotation 0 0 0
  bounding box size 4.5 3 2.85088
  cross sections:
    n  XDelta  YDelta  ZDelta  shape
    0  0       0       0       point
    1  1       0       0       edit curve Width=3 Height=2.85088 AbsoluteFlag=0 SymType=0 linear points (X Y): 0.5 0.121146, 0.302219 -0.5, -0.301157 -0.5, -0.5 0.125471, 0 0.5, 0.5 0.121146
    2  2       0       0       ellipse Ellipse_Height=2.5 Ellipse_Width=3
    3  1       0       0       as above
    4  0.5     0       0       point
