OpenVSP model (file version 5), 2 components.
Geometry view with OpenVSP parameter names; values to 6 digits, angles in degrees, lengths in the model's unit.
Overall bounding box: X_Min=0 X_Len=124.75 Y_Min=-6.97139 Y_Len=13.9428 Z_Min=-4.65672 Z_Len=13

Fuselage "Fuselage"
  location (X Y Z) 0 0 0, rotation 0 0 0
  bounding box size 124.75 13.9428 13
  mass: Density=1 Shell_Flag=1 Mass_Area=1 Mass_Prior=0
  Design: Length=124.75
  cross sections:
    n  XLocPercent  YLocPercent  ZLocPercent  shape
    0  0            0            0            point
    1  0.0319488    0            0.00117095   ellipse Ellipse_Height=6.5 Ellipse_Width=5.5
    2  0.235143     0            0.0147758    ellipse Ellipse_Height=13 Ellipse_Width=12.3333
    3  0.642051     0            0.0147758    as above
    4  0.730978     0            0.0164431    ellipse Ellipse_Height=12.0702 Ellipse_Width=12.3333
    5  0.99         0            0.0467919    ellipse Ellipse_Height=4.5 Ellipse_Width=1.5
    6  1            0            0.0467919    point

Mesh "MeshGeom"
  location (X Y Z) 0 0 0, rotation 0 0 0
  triangle mesh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

VSPAERO settings: Sref=1312.97 bref=112.583 cref=13.5009 Xcg=0 Ycg=0 Zcg=0 AlphaStart=0 AlphaEnd=10 AlphaNpts=1 BetaStart=0 BetaEnd=0 BetaNpts=1 MachStart=0.75 MachEnd=0 MachNpts=1 ReCref=1e+07 Vinf=100 Rho=0.002377
