OpenVSP model (file version 5), 2 components.
Geometry view with OpenVSP parameter names; values to 6 digits, angles in degrees, lengths in the model's unit.
Overall bounding box: X_Min=-0.151657 X_Len=0.29702 Y_Min=0 Y_Len=7.00541 Z_Min=-2.69564 Z_Len=5.39128

Propeller "PropGeom"
  location (X Y Z) 0 4 0, rotation 0 0 0
  bounding box size 0.29702 4.71157 5.39128
  Design: Diameter=6 NumBlade=3 Beta34=20 UseBeta34Flag=1 Feather=0 Rotate=0 Precone=0 ReverseFlag=0 FoldAngle=0 PropMode=0 AF=152.185 CLi=0.540586 Chord=0.175828 Solidity=0.167904 ConstructXoC=0.5 FeatherAxisXoC=0.5 FeatherOffsetXoC=0
  cross sections:
    n  RadiusFrac  shape
    0  0.1         NACA 4-series Camber=0.0259872 CamberLoc=0.2 Chord=0.244444 ThickChord=0.5
    1  0.4         NACA 16-series Chord=0.535324 IdealCl=0.7 ThickChord=0.144074
    2  1           NACA 16-series Chord=0.39 IdealCl=0.2 ThickChord=0.03
  Chord along r/R (cubic Bezier): 0.1: 0.0814815, 0.266667: 0.151481, 0.433333: 0.2, 0.6: 0.2, 0.716667: 0.2, 0.833333: 0.2, 0.95: 0.2, 0.966667: 0.2, 0.983333: 0.2, 1: 0.13
  Twist along r/R (PCHIP): 0.1: 46.75, 0.75: 20, 1: 13
  Thick along r/R (cubic Bezier): 0.1: 0.5, 0.166667: 0.3, 0.233333: 0.225, 0.3: 0.2, 0.4: 0.125, 0.5: 0.115, 0.6: 0.1, 0.733333: 0.075, 0.866667: 0.055, 1: 0.03
  CLI along r/R (cubic Bezier): 0.1: 0.4, 0.2: 0.7, 0.3: 0.7, 0.4: 0.7, 0.466667: 0.7, 0.533333: 0.7, 0.6: 0.7, 0.733333: 0.7, 0.866667: 0.7, 1: 0.2

Hinge "HingeGeom"
  location (X Y Z) 0 0 0, rotation 0 90 0
  Hinge: JointRotMax=360 JointRotMaxFlag=0 JointRotMin=-360 JointRotMinFlag=0 JointRotate=0 JointRotateFlag=1 JointTransMax=1000 JointTransMaxFlag=0 JointTransMin=-1000 JointTransMinFlag=0 JointTranslate=0 JointTranslateFlag=0 OrientRotFlag=1 PrimOffAbsRelFlag=1 PrimType=1 PrimULoc=0 PrimVecAbsRelFlag=1 PrimWLoc=0 PrimXOff=0 PrimXOffRel=0 PrimXVec=0 PrimXVecRel=0 PrimYOff=20 PrimYOffRel=20 PrimYVec=1 PrimYVecRel=1 PrimZOff=0 PrimZOffRel=0 PrimZVec=0 PrimZVecRel=0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
