OpenVSP model (file version 5), 25 components.
Geometry view with OpenVSP parameter names; values to 6 digits, angles in degrees, lengths in the model's unit.
Overall bounding box: X_Min=-0.199592 X_Len=2.90635 Y_Min=-0.608523 Y_Len=1.21705 Z_Min=-0.608523 Z_Len=1.21705

Fuselage "Outer_Nacelle"
  location (X Y Z) 0 0 0, rotation 0 0 0
  bounding box size 1.8288 1.21705 1.21705
  Design: Length=1.8288
  cross sections:
    n  XLocPercent  YLocPercent  ZLocPercent  shape
    0  1            0            0            circle Circle_Diameter=0.958807
    1  0.842391     0            0            circle Circle_Diameter=0.980114
    2  0.73913      0            0            circle Circle_Diameter=1.03866
    3  0.076087     0            0            circle Circle_Diameter=1.08194
    4  0            0            0            circle Circle_Diameter=1
    5  0.0652174    0            0            circle Circle_Diameter=1.21705
    6  0.657609     0            0            circle Circle_Diameter=1.15813
    7  1            0            0            circle Circle_Diameter=0.958807

Fuselage "Core_Nacelle", child of "Outer_Nacelle"
  location (X Y Z) 0.200408 0 0, rotation 0 0 0
  bounding box size 2.50635 0.892387 0.892387
  Design: Length=2.50635
  cross sections:
    n   XLocPercent  YLocPercent  ZLocPercent  shape
    0   1            0            0            circle Circle_Diameter=0.663514
    1   0.986974     0            0            circle Circle_Diameter=0.623515
    2   0.793478     0            0            circle Circle_Diameter=0.755425
    3   0.414402     0            0            circle Circle_Diameter=0.413566
    4   0.259629     0            0            as above
    5   0.067344     0            0            circle Circle_Diameter=0.724791
    6   0            0            0            circle Circle_Diameter=0.777273
    7   0.0652174    0            0            circle Circle_Diameter=0.812789
    8   0.543478     0            0            circle Circle_Diameter=0.892387
    9   0.782018     0            0            circle Circle_Diameter=0.801867
    10  1            0            0            circle Circle_Diameter=0.663514

Fuselage "Shaft"
  location (X Y Z) -0.199592 0 0, rotation 0 0 0
  bounding box size 2.78702 0.631944 0.631944
  Design: Length=2.78702
  cross sections:
    n  XLocPercent  YLocPercent  ZLocPercent  shape
    0  0            0            0            point
    1  0.138889     0            0            circle Circle_Diameter=0.331019
    2  0.146296     0            0            circle Circle_Diameter=0.631944
    3  0.373374     0            0            circle Circle_Diameter=0.304302
    4  0.589465     0            0            as above
    5  0.631483     0            0            circle Circle_Diameter=0.431708
    6  0.805556     0            0            circle Circle_Diameter=0.451389
    7  1            0            0            point

Wing "fan", child of "Shaft"
  location (X Y Z) 0.0243801 0.0590217 0, rotation 0 0 0; relative location 0.223972 0.0590217 0, rotation 0 0 0
  20 copies around X
  bounding box size 0.129502 1.00568 1.00568
  totals: TotalSpan=0.887641 TotalProjectedSpan=0.887641 TotalChord=0.15 TotalArea=0.133146 TotalAR=5.91761 RelativeTwistFlag=1
  root: chord 0.2, twist -50, NACA 4-series Camber=0 CamberLoc=0.2 ThickChord=0.1
  sections:
    n  Span      Root_Chord  Tip_Chord  Area       Sweep  Sweep_Location  Dihedral  Twist  Twist_Location  tip airfoil
    1  0.443821  0.2         0.1        0.0665731  0      0.5             0         -15    0.5             as above

Wing "lpc-1", child of "Shaft"
  location (X Y Z) 0.316712 0.29 0, rotation 0 0 0; relative location 0.516304 0.29 0, rotation 0 0 0
  80 copies around X
  bounding box size 0.0328518 0.701711 0.701711
  totals: TotalSpan=0.121289 TotalProjectedSpan=0.121289 TotalChord=0.04 TotalArea=0.00485156 TotalAR=3.03223 RelativeTwistFlag=1
  root: chord 0.04, twist -35, NACA 4-series Camber=0 CamberLoc=0.2 ThickChord=0.1
  sections:
    n  Span       Root_Chord  Tip_Chord  Area        Sweep  Sweep_Location  Dihedral  Twist  Twist_Location  tip airfoil
    1  0.0606445  0.04        0.04       0.00242578  0      0               0         -20    0.5             as above

Wing "lpc-2", child of "lpc-1"
  location (X Y Z) 0.388043 0.29 0, rotation 0 0 -15; relative location 0.0713315 0 0, rotation 0 0 -15
  80 copies around X
  bounding box size 0.0317324 0.683903 0.683903
  totals: TotalSpan=0.104125 TotalProjectedSpan=0.104125 TotalChord=0.04 TotalArea=0.00416499 TotalAR=2.60312 RelativeTwistFlag=1
  root: chord 0.04, twist -35, NACA 4-series Camber=0 CamberLoc=0.2 ThickChord=0.1
  sections:
    n  Span       Root_Chord  Tip_Chord  Area        Sweep  Sweep_Location  Dihedral  Twist  Twist_Location  tip airfoil
    1  0.0520624  0.04        0.04       0.00208249  -15    0               0         -20    0.5             as above

Wing "lpc-3", child of "lpc-2"
  location (X Y Z) 0.455978 0.262826 0, rotation 0 0 -15; relative location 0.0679348 -0.0271739 0, rotation 0 0 -15
  75 copies around X
  bounding box size 0.0317324 0.62978 0.6298
  totals: TotalSpan=0.104125 TotalProjectedSpan=0.104125 TotalChord=0.04 TotalArea=0.00416499 TotalAR=2.60312 RelativeTwistFlag=1
  root: chord 0.04, twist -35, NACA 4-series Camber=0 CamberLoc=0.2 ThickChord=0.1
  sections:
    n  Span       Root_Chord  Tip_Chord  Area        Sweep  Sweep_Location  Dihedral  Twist  Twist_Location  tip airfoil
    1  0.0520624  0.04        0.04       0.00208249  -15    0               0         -20    0.5             as above

Wing "lpc-4", child of "lpc-3"
  location (X Y Z) 0.523913 0.235652 0, rotation 0 0 -15; relative location 0.0679348 -0.0271739 0, rotation 0 0 -15
  70 copies around X
  bounding box size 0.0317324 0.57536 0.575657
  totals: TotalSpan=0.104125 TotalProjectedSpan=0.104125 TotalChord=0.04 TotalArea=0.00416499 TotalAR=2.60312 RelativeTwistFlag=1
  root: chord 0.04, twist -35, NACA 4-series Camber=0 CamberLoc=0.2 ThickChord=0.1
  sections:
    n  Span       Root_Chord  Tip_Chord  Area        Sweep  Sweep_Location  Dihedral  Twist  Twist_Location  tip airfoil
    1  0.0520624  0.04        0.04       0.00208249  -15    0               0         -20    0.5             as above

Wing "lpc-5", child of "lpc-4"
  location (X Y Z) 0.588451 0.208478 0, rotation 0 0 -15; relative location 0.064538 -0.0271739 0, rotation 0 0 -15
  65 copies around X
  bounding box size 0.0317324 0.532146 0.532149
  totals: TotalSpan=0.114676 TotalProjectedSpan=0.114676 TotalChord=0.04 TotalArea=0.00458704 TotalAR=2.8669 RelativeTwistFlag=1
  root: chord 0.04, twist -35, NACA 4-series Camber=0 CamberLoc=0.2 ThickChord=0.1
  sections:
    n  Span      Root_Chord  Tip_Chord  Area        Sweep  Sweep_Location  Dihedral  Twist  Twist_Location  tip airfoil
    1  0.057338  0.04        0.04       0.00229352  -15    0               0         -20    0.5             as above

Wing "lpc-6", child of "lpc-5"
  location (X Y Z) 0.652989 0.181304 0, rotation 0 0 -15; relative location 0.064538 -0.0271739 0, rotation 0 0 -15
  60 copies around X
  bounding box size 0.0317324 0.47777 0.47777
  totals: TotalSpan=0.114676 TotalProjectedSpan=0.114676 TotalChord=0.04 TotalArea=0.00458704 TotalAR=2.8669 RelativeTwistFlag=1
  root: chord 0.04, twist -35, NACA 4-series Camber=0 CamberLoc=0.2 ThickChord=0.1
  sections:
    n  Span      Root_Chord  Tip_Chord  Area        Sweep  Sweep_Location  Dihedral  Twist  Twist_Location  tip airfoil
    1  0.057338  0.04        0.04       0.00229352  -15    0               0         -20    0.5             as above

Wing "lpc-7", child of "lpc-6"
  location (X Y Z) 0.724321 0.15413 0, rotation 0 0 -15; relative location 0.0713315 -0.0271739 0, rotation 0 0 -15
  55 copies around X
  bounding box size 0.0317324 0.429926 0.429884
  totals: TotalSpan=0.120711 TotalProjectedSpan=0.120711 TotalChord=0.04 TotalArea=0.00482846 TotalAR=3.01779 RelativeTwistFlag=1
  root: chord 0.04, twist -35, NACA 4-series Camber=0 CamberLoc=0.2 ThickChord=0.1
  sections:
    n  Span       Root_Chord  Tip_Chord  Area        Sweep  Sweep_Location  Dihedral  Twist  Twist_Location  tip airfoil
    1  0.0603557  0.04        0.04       0.00241423  -15    0               0         -20    0.5             as above

Wing "lpc-8", child of "lpc-7"
  location (X Y Z) 0.788859 0.140543 0, rotation 0 0 -15; relative location 0.064538 -0.013587 0, rotation 0 0 -15
  50 copies around X
  bounding box size 0.0317324 0.385579 0.385835
  totals: TotalSpan=0.104125 TotalProjectedSpan=0.104125 TotalChord=0.04 TotalArea=0.00416499 TotalAR=2.60312 RelativeTwistFlag=1
  root: chord 0.04, twist -35, NACA 4-series Camber=0 CamberLoc=0.2 ThickChord=0.1
  sections:
    n  Span       Root_Chord  Tip_Chord  Area        Sweep  Sweep_Location  Dihedral  Twist  Twist_Location  tip airfoil
    1  0.0520624  0.04        0.04       0.00208249  -15    0               0         -20    0.5             as above

Wing "hpc-1", child of "Shaft"
  location (X Y Z) 0.926427 0.126957 0, rotation 0 0 0; relative location 1.12602 0.126957 0, rotation 0 0 0
  50 copies around X
  bounding box size 0.0153786 0.375202 0.375553
  totals: TotalSpan=0.121289 TotalProjectedSpan=0.121289 TotalChord=0.02 TotalArea=0.00242578 TotalAR=6.06445 RelativeTwistFlag=1
  root: chord 0.02, twist -40, NACA 4-series Camber=0 CamberLoc=0.2 ThickChord=0.1
  sections:
    n  Span       Root_Chord  Tip_Chord  Area        Sweep  Sweep_Location  Dihedral  Twist  Twist_Location  tip airfoil
    1  0.0606445  0.02        0.02       0.00121289  0      0               0         -20    0.5             as above

Wing "hpc-2", child of "hpc-1"
  location (X Y Z) 0.958427 0.126957 0, rotation 0 0 0; relative location 0.032 0 0, rotation 0 0 0
  50 copies around X
  bounding box size 0.0153786 0.375202 0.375553
  totals: TotalSpan=0.121289 TotalProjectedSpan=0.121289 TotalChord=0.02 TotalArea=0.00242578 TotalAR=6.06445 RelativeTwistFlag=1
  root: chord 0.02, twist -40, NACA 4-series Camber=0 CamberLoc=0.2 ThickChord=0.1
  sections:
    n  Span       Root_Chord  Tip_Chord  Area        Sweep  Sweep_Location  Dihedral  Twist  Twist_Location  tip airfoil
    1  0.0606445  0.02        0.02       0.00121289  0      0               0         -20    0.5             as above

Wing "hpc-3", child of "hpc-2"
  location (X Y Z) 0.990427 0.126957 0, rotation 0 0 0; relative location 0.032 0 0, rotation 0 0 0
  50 copies around X
  bounding box size 0.0153786 0.375202 0.375553
  totals: TotalSpan=0.121289 TotalProjectedSpan=0.121289 TotalChord=0.02 TotalArea=0.00242578 TotalAR=6.06445 RelativeTwistFlag=1
  root: chord 0.02, twist -40, NACA 4-series Camber=0 CamberLoc=0.2 ThickChord=0.1
  sections:
    n  Span       Root_Chord  Tip_Chord  Area        Sweep  Sweep_Location  Dihedral  Twist  Twist_Location  tip airfoil
    1  0.0606445  0.02        0.02       0.00121289  0      0               0         -20    0.5             as above

Wing "hpc-4", child of "hpc-3"
  location (X Y Z) 1.02243 0.126957 0, rotation 0 0 0; relative location 0.032 0 0, rotation 0 0 0
  50 copies around X
  bounding box size 0.0153786 0.375202 0.375553
  totals: TotalSpan=0.121289 TotalProjectedSpan=0.121289 TotalChord=0.02 TotalArea=0.00242578 TotalAR=6.06445 RelativeTwistFlag=1
  root: chord 0.02, twist -40, NACA 4-series Camber=0 CamberLoc=0.2 ThickChord=0.1
  sections:
    n  Span       Root_Chord  Tip_Chord  Area        Sweep  Sweep_Location  Dihedral  Twist  Twist_Location  tip airfoil
    1  0.0606445  0.02        0.02       0.00121289  0      0               0         -20    0.5             as above

Wing "hpc-5", child of "hpc-4"
  location (X Y Z) 1.05443 0.126957 0, rotation 0 0 0; relative location 0.032 0 0, rotation 0 0 0
  50 copies around X
  bounding box size 0.0153786 0.375202 0.375553
  totals: TotalSpan=0.121289 TotalProjectedSpan=0.121289 TotalChord=0.02 TotalArea=0.00242578 TotalAR=6.06445 RelativeTwistFlag=1
  root: chord 0.02, twist -40, NACA 4-series Camber=0 CamberLoc=0.2 ThickChord=0.1
  sections:
    n  Span       Root_Chord  Tip_Chord  Area        Sweep  Sweep_Location  Dihedral  Twist  Twist_Location  tip airfoil
    1  0.0606445  0.02        0.02       0.00121289  0      0               0         -20    0.5             as above

Wing "hpc-6", child of "hpc-5"
  location (X Y Z) 1.08643 0.126957 0, rotation 0 0 0; relative location 0.032 0 0, rotation 0 0 0
  50 copies around X
  bounding box size 0.0153786 0.375202 0.375553
  totals: TotalSpan=0.121289 TotalProjectedSpan=0.121289 TotalChord=0.02 TotalArea=0.00242578 TotalAR=6.06445 RelativeTwistFlag=1
  root: chord 0.02, twist -40, NACA 4-series Camber=0 CamberLoc=0.2 ThickChord=0.1
  sections:
    n  Span       Root_Chord  Tip_Chord  Area        Sweep  Sweep_Location  Dihedral  Twist  Twist_Location  tip airfoil
    1  0.0606445  0.02        0.02       0.00121289  0      0               0         -20    0.5             as above

Wing "hpt-1", child of "Shaft"
  location (X Y Z) 1.43515 0.126957 0, rotation 0 0 0; relative location 1.63474 0.126957 0, rotation 0 0 0
  50 copies around X
  bounding box size 0.0153786 0.370288 0.370648
  totals: TotalSpan=0.116374 TotalProjectedSpan=0.116374 TotalChord=0.02 TotalArea=0.00232749 TotalAR=5.81872 RelativeTwistFlag=1
  root: chord 0.02, twist 40, NACA 4-series Camber=0 CamberLoc=0.2 ThickChord=0.1
  sections:
    n  Span       Root_Chord  Tip_Chord  Area        Sweep  Sweep_Location  Dihedral  Twist  Twist_Location  tip airfoil
    1  0.0581872  0.02        0.02       0.00116374  0      0               0         20     0.5             as above

Wing "hpt-2", child of "hpt-1"
  location (X Y Z) 1.5318 0.185978 0, rotation 0 0 0; relative location 0.0966438 0.0590217 0, rotation 0 0 0
  50 copies around X
  bounding box size 0.0153786 0.518341 0.51841
  totals: TotalSpan=0.146384 TotalProjectedSpan=0.146384 TotalChord=0.02 TotalArea=0.00292769 TotalAR=7.31922 RelativeTwistFlag=1
  root: chord 0.02, twist 40, NACA 4-series Camber=0 CamberLoc=0.2 ThickChord=0.1
  sections:
    n  Span       Root_Chord  Tip_Chord  Area        Sweep  Sweep_Location  Dihedral  Twist  Twist_Location  tip airfoil
    1  0.0731922  0.02        0.02       0.00146384  0      0               0         20     0.5             as above

Wing "lpt-1", child of "Shaft"
  location (X Y Z) 1.59779 0.203804 0, rotation 0 0 15; relative location 1.79738 0.203804 0, rotation 0 0 15
  55 copies around X
  bounding box size 0.0317324 0.586817 0.587034
  totals: TotalSpan=0.156924 TotalProjectedSpan=0.156924 TotalChord=0.04 TotalArea=0.00627697 TotalAR=3.92311 RelativeTwistFlag=1
  root: chord 0.04, twist 35, NACA 4-series Camber=0 CamberLoc=0.2 ThickChord=0.1
  sections:
    n  Span       Root_Chord  Tip_Chord  Area        Sweep  Sweep_Location  Dihedral  Twist  Twist_Location  tip airfoil
    1  0.0784621  0.04        0.04       0.00313848  15     0.5             0         20     0.5             as above

Wing "lpt-2", child of "lpt-1"
  location (X Y Z) 1.67199 0.203804 0, rotation 0 0 15; relative location 0.074206 0 0, rotation 0 0 15
  60 copies around X
  bounding box size 0.0317324 0.626427 0.626427
  totals: TotalSpan=0.195626 TotalProjectedSpan=0.195626 TotalChord=0.04 TotalArea=0.00782506 TotalAR=4.89066 RelativeTwistFlag=1
  root: chord 0.04, twist 35, NACA 4-series Camber=0 CamberLoc=0.2 ThickChord=0.1
  sections:
    n  Span       Root_Chord  Tip_Chord  Area        Sweep  Sweep_Location  Dihedral  Twist  Twist_Location  tip airfoil
    1  0.0978132  0.04        0.04       0.00391253  15     0.5             0         20     0.5             as above

Wing "lpt-3", child of "lpt-2"
  location (X Y Z) 1.7462 0.203804 0, rotation 0 0 15; relative location 0.074206 0 0, rotation 0 0 15
  65 copies around X
  bounding box size 0.0317324 0.652131 0.652292
  totals: TotalSpan=0.22 TotalProjectedSpan=0.22 TotalChord=0.04 TotalArea=0.0088 TotalAR=5.5 RelativeTwistFlag=1
  root: chord 0.04, twist 35, NACA 4-series Camber=0 CamberLoc=0.2 ThickChord=0.1
  sections:
    n  Span  Root_Chord  Tip_Chord  Area    Sweep  Sweep_Location  Dihedral  Twist  Twist_Location  tip airfoil
    1  0.11  0.04        0.04       0.0044  15     0.5             0         20     0.5             as above

Wing "lpt-4", child of "lpt-3"
  location (X Y Z) 1.82383 0.203804 0, rotation 0 0 15; relative location 0.0776318 0 0, rotation 0 0 15
  65 copies around X
  bounding box size 0.0396655 0.669613 0.669799
  totals: TotalSpan=0.234435 TotalProjectedSpan=0.234435 TotalChord=0.045 TotalArea=0.0105496 TotalAR=5.20968 RelativeTwistFlag=1
  root: chord 0.05, twist 35, NACA 4-series Camber=0 CamberLoc=0.2 ThickChord=0.1
  sections:
    n  Span      Root_Chord  Tip_Chord  Area       Sweep  Sweep_Location  Dihedral  Twist  Twist_Location  tip airfoil
    1  0.117218  0.05        0.04       0.0052748  15     0.5             0         20     0.5             as above

Wing "lpt-5", child of "lpt-4"
  location (X Y Z) 1.90287 0.203804 0, rotation 0 0 15; relative location 0.0790424 0 0, rotation 0 0 15
  70 copies around X
  bounding box size 0.0475986 0.694371 0.69463
  totals: TotalSpan=0.253972 TotalProjectedSpan=0.253972 TotalChord=0.055 TotalArea=0.0139684 TotalAR=4.61767 RelativeTwistFlag=1
  root: chord 0.06, twist 35, NACA 4-series Camber=0 CamberLoc=0.2 ThickChord=0.1
  sections:
    n  Span      Root_Chord  Tip_Chord  Area        Sweep  Sweep_Location  Dihedral  Twist  Twist_Location  tip airfoil
    1  0.126986  0.06        0.05       0.00698422  15     0.5             0         20     0.5             as above
