OpenVSP model (file version 5), 12 components.
Geometry view with OpenVSP parameter names; values to 6 digits, angles in degrees, lengths in the model's unit.
Overall bounding box: X_Min=-1.5433 X_Len=2.0866 Y_Min=-0.05 Y_Len=0.1 Z_Min=-0.05 Z_Len=1.83205

Hinge "HingeGeom"
  location (X Y Z) 0 0 0, rotation 0 -60 0
  Hinge: JointRotMax=60 JointRotMaxFlag=1 JointRotMin=0 JointRotMinFlag=1 JointRotate=0 JointRotateFlag=1 JointTransMax=1000 JointTransMaxFlag=0 JointTransMin=-1000 JointTransMinFlag=0 JointTranslate=0 JointTranslateFlag=0 OrientRotFlag=0 PrimOffAbsRelFlag=1 PrimType=0 PrimULoc=0 PrimVecAbsRelFlag=1 PrimWLoc=0 PrimXOff=0 PrimXOffRel=0 PrimXVec=0 PrimXVecRel=0 PrimYOff=0 PrimYOffRel=0 PrimYVec=1 PrimYVecRel=1 PrimZOff=0 PrimZOffRel=0 PrimZVec=0 PrimZVecRel=0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

Mesh "MeshGeom", child of "HingeGeom"
  location (X Y Z) 0 0 0, rotation 0 -60 0; relative location 0 0 0, rotation 0 0 0
  triangle mesh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

Hinge "HingeGeom", child of "MeshGeom"
  location (X Y Z) 0.5 0 0.866025, rotation -180 -60 -180; relative location 1 0 0, rotation 0 -60 0
  Hinge: JointRotMax=60 JointRotMaxFlag=1 JointRotMin=0 JointRotMinFlag=1 JointRotate=0 JointRotateFlag=1 JointTransMax=1000 JointTransMaxFlag=0 JointTransMin=-1000 JointTransMinFlag=0 JointTranslate=0 JointTranslateFlag=0 OrientRotFlag=0 PrimOffAbsRelFlag=1 PrimType=0 PrimULoc=0 PrimVecAbsRelFlag=1 PrimWLoc=0 PrimXOff=0 PrimXOffRel=0 PrimXVec=0 PrimXVecRel=0 PrimYOff=0 PrimYOffRel=0 PrimYVec=1 PrimYVecRel=1 PrimZOff=0 PrimZOffRel=0 PrimZVec=0 PrimZVecRel=0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

Mesh "MeshGeom", child of "HingeGeom"
  location (X Y Z) 0.5 0 0.866025, rotation -180 -60 -180; relative location 0 0 0, rotation 0 0 0
  triangle mesh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

Hinge "HingeGeom", child of "MeshGeom"
  location (X Y Z) 0 0 1.73205, rotation -180 0 -180; relative location 1 0 0, rotation 0 -60 0
  Hinge: JointRotMax=60 JointRotMaxFlag=1 JointRotMin=0 JointRotMinFlag=1 JointRotate=0 JointRotateFlag=1 JointTransMax=1000 JointTransMaxFlag=0 JointTransMin=-1000 JointTransMinFlag=0 JointTranslate=0 JointTranslateFlag=0 OrientRotFlag=0 PrimOffAbsRelFlag=1 PrimType=0 PrimULoc=0 PrimVecAbsRelFlag=1 PrimWLoc=0 PrimXOff=0 PrimXOffRel=0 PrimXVec=0 PrimXVecRel=0 PrimYOff=0 PrimYOffRel=0 PrimYVec=1 PrimYVecRel=1 PrimZOff=0 PrimZOffRel=0 PrimZVec=0 PrimZVecRel=0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

Mesh "MeshGeom", child of "HingeGeom"
  location (X Y Z) 0 0 1.73205, rotation -180 0 -180; relative location 0 0 0, rotation 0 0 0
  triangle mesh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

Hinge "HingeGeom", child of "MeshGeom"
  location (X Y Z) -1 0 1.73205, rotation -180 60 -180; relative location 1 0 0, rotation 0 -60 0
  Hinge: JointRotMax=60 JointRotMaxFlag=1 JointRotMin=0 JointRotMinFlag=1 JointRotate=0 JointRotateFlag=1 JointTransMax=1000 JointTransMaxFlag=0 JointTransMin=-1000 JointTransMinFlag=0 JointTranslate=0 JointTranslateFlag=0 OrientRotFlag=0 PrimOffAbsRelFlag=1 PrimType=0 PrimULoc=0 PrimVecAbsRelFlag=1 PrimWLoc=0 PrimXOff=0 PrimXOffRel=0 PrimXVec=0 PrimXVecRel=0 PrimYOff=0 PrimYOffRel=0 PrimYVec=1 PrimYVecRel=1 PrimZOff=0 PrimZOffRel=0 PrimZVec=0 PrimZVecRel=0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

Mesh "MeshGeom", child of "HingeGeom"
  location (X Y Z) -1 0 1.73205, rotation -180 60 -180; relative location 0 0 0, rotation 0 0 0
  triangle mesh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

Hinge "HingeGeom", child of "MeshGeom"
  location (X Y Z) -1.5 0 0.866025, rotation 0 60 0; relative location 1 0 0, rotation 0 -60 0
  Hinge: JointRotMax=60 JointRotMaxFlag=1 JointRotMin=0 JointRotMinFlag=1 JointRotate=0 JointRotateFlag=1 JointTransMax=1000 JointTransMaxFlag=0 JointTransMin=-1000 JointTransMinFlag=0 JointTranslate=0 JointTranslateFlag=0 OrientRotFlag=0 PrimOffAbsRelFlag=1 PrimType=0 PrimULoc=0 PrimVecAbsRelFlag=1 PrimWLoc=0 PrimXOff=0 PrimXOffRel=0 PrimXVec=0 PrimXVecRel=0 PrimYOff=0 PrimYOffRel=0 PrimYVec=1 PrimYVecRel=1 PrimZOff=0 PrimZOffRel=0 PrimZVec=0 PrimZVecRel=0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

Mesh "MeshGeom", child of "HingeGeom"
  location (X Y Z) -1.5 0 0.866025, rotation 0 60 0; relative location 0 0 0, rotation 0 0 0
  triangle mesh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

Hinge "HingeGeom", child of "MeshGeom"
  location (X Y Z) -1 0 0, rotation 0 0 0; relative location 1 0 0, rotation 0 -60 0
  Hinge: JointRotMax=60 JointRotMaxFlag=1 JointRotMin=0 JointRotMinFlag=1 JointRotate=0 JointRotateFlag=1 JointTransMax=1000 JointTransMaxFlag=0 JointTransMin=-1000 JointTransMinFlag=0 JointTranslate=0 JointTranslateFlag=0 OrientRotFlag=0 PrimOffAbsRelFlag=1 PrimType=0 PrimULoc=0 PrimVecAbsRelFlag=1 PrimWLoc=0 PrimXOff=0 PrimXOffRel=0 PrimXVec=0 PrimXVecRel=0 PrimYOff=0 PrimYOffRel=0 PrimYVec=1 PrimYVecRel=1 PrimZOff=0 PrimZOffRel=0 PrimZVec=0 PrimZVecRel=0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

Mesh "MeshGeom", child of "HingeGeom"
  location (X Y Z) -1 0 0, rotation 0 0 0; relative location 0 0 0, rotation 0 0 0
  triangle mesh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

User parameters
  Default_Group:HingeFrac = 0  (Default_Desc)

Parameter links (A drives B)
  UserParm:Default_Group:HingeFrac -> HingeGeom:Hinge:JointRotate Scale=60
  UserParm:Default_Group:HingeFrac -> HingeGeom:Hinge:JointRotate Scale=60
  UserParm:Default_Group:HingeFrac -> HingeGeom:Hinge:JointRotate Scale=60
  UserParm:Default_Group:HingeFrac -> HingeGeom:Hinge:JointRotate Scale=60
  UserParm:Default_Group:HingeFrac -> HingeGeom:Hinge:JointRotate Scale=60
  UserParm:Default_Group:HingeFrac -> HingeGeom:Hinge:JointRotate Scale=60
