OpenVSP model (file version 5), 2 components.
Geometry view with OpenVSP parameter names; values to 6 digits, angles in degrees, lengths in the model's unit.
Overall bounding box: X_Min=0 X_Len=18.6603 Y_Min=-2.13237 Y_Len=4.97014 Z_Min=-1.91587 Z_Len=5.66587

Stack "StackGeom"
  location (X Y Z) 0 0 0, rotation 0 0 0
  bounding box size 18.6603 4.97014 5.66587
  cross sections:
    n  XDelta  YDelta  YRotate  ZDelta  ZRotate  shape
    0  0       0       0        0       0        point
    1  5       0       -30      0       0        ellipse Ellipse_Height=2.5 Ellipse_Width=3
    2  5       0       30       0       0        as above
    3  5       0       0        0       30       as above
    4  5       0       0        0       0        point

Blank "BlankGeom", child of "StackGeom"
  location (X Y Z) 9.33013 0 3.75, rotation 0 0 0; relative location 0 0 0, rotation 0 0 0
