OpenVSP model (file version 5), 1 components.
Geometry view with OpenVSP parameter names; values to 6 digits, angles in degrees, lengths in the model's unit.
Overall bounding box: X_Min=0 X_Len=30 Y_Min=-3.41199 Y_Len=6.82397 Z_Min=-2.29398 Z_Len=7.01932

Fuselage "FuselageGeom"
  location (X Y Z) 0 0 0, rotation 0 0 0
  bounding box size 30 6.82397 7.01932
  Design: Length=30
  cross sections:
    n  XLocPercent  YLocPercent  YRotate  ZLocPercent  shape
    0  0            0            0        0            point
    1  0.146739     0            0        0            circle Circle_Diameter=4.57841
    2  0.310669     0            -15      0.037689     general fuselage BotStr=0.83 BotTanAngle=90 CornerRad=0 Height=7.09091 LowStr=0.83 MaxWidthLoc=-0.3 TopStr=0.83 TopTanAngle=90 UpStr=0.83 Width=6.81818
    3  0.531704     0            0        0.0244565    ellipse Ellipse_Height=5.93818 Ellipse_Width=6.53409
    4  0.979639     0            0        0.00271739   circle Circle_Diameter=2.17521
    5  1            0            0        0            point
