OpenVSP model (file version 5), 2 components.
Geometry view with OpenVSP parameter names; values to 6 digits, angles in degrees, lengths in the model's unit.
Overall bounding box: X_Min=-0.5 X_Len=1.46213 Y_Min=-0.95 Y_Len=1.45 Z_Min=-10 Z_Len=10

Stack "Threads"
  location (X Y Z) 0 -0.7 -0.217391, rotation 0 0 0
  bounding box size 0.973583 0.956425 0.35
  cross sections:
    n  XDelta  YDelta  ZDelta  ZRotate  shape
    0  0       0       0       0        wedge Chord=0.5 ThickChord=0.5 ThickLoc=1
    1  0.5     0.2     -0.05   45       as above
    2  0.5     0.2     -0.05   45       as above

Stack "StackGeom"
  location (X Y Z) 0 0 0, rotation 0 90 0
  bounding box size 1 1 10
  cross sections:
    n  XDelta  YDelta  ZDelta  shape
    0  0       0       0       point
    1  0       0       0       circle Circle_Diameter=1
    2  10      0       0       as above
    3  0       0       0       point
