OpenVSP model (file version 5), 1 components.
Geometry view with OpenVSP parameter names; values to 6 digits, angles in degrees, lengths in the model's unit.
Overall bounding box: X_Min=0 X_Len=2.43394 Y_Min=-1.54833 Y_Len=3.09666 Z_Min=-0.677395 Z_Len=1.24533

Stack "MindBender"
  location (X Y Z) 0 0 0, rotation 0 0 0
  bounding box size 2.43394 3.09666 1.24533
  cross sections:
    n  XDelta  XRotate  YDelta  YRotate  ZDelta  shape
    0  0       0        0       0        0       point
    1  1       0        0       0        0       ellipse Ellipse_Height=0.568182 Ellipse_Width=3
    2  1       15       0       30       0       as above
    3  0.5     0        0       0        0       point
