OpenVSP model (file version 5), 1 components.
Geometry view with OpenVSP parameter names; values to 6 digits, angles in degrees, lengths in the model's unit.
Overall bounding box: X_Min=0 X_Len=4.22558 Y_Min=-1.375 Y_Len=2.75 Z_Min=-1.375 Z_Len=2.75

Stack "StackGeom"
  location (X Y Z) 0 0 0, rotation 0 0 0
  bounding box size 4.22558 2.75 2.75
  cross sections:
    n  XDelta  YDelta  ZDelta  shape
    0  0       0       0       circle Circle_Diameter=1.18182
    1  0.2     0       0       circle Circle_Diameter=1.38475
    2  4       0       0       circle Circle_Diameter=2.75
    3  0       0       0       circle Circle_Diameter=2.5
    4  -4.2    0       0       circle Circle_Diameter=1.18182
