OpenVSP model (file version 5), 2 components.
Geometry view with OpenVSP parameter names; values to 6 digits, angles in degrees, lengths in the model's unit.
Overall bounding box: X_Min=-5.33037 X_Len=10.1452 Y_Min=-5 Y_Len=10 Z_Min=-7.40594 Z_Len=7.65469

Stack "StackGeom"
  location (X Y Z) 0 0 0, rotation -180 80 -180
  bounding box size 10.1452 10 7.65469
  cross sections:
    n  XDelta     YDelta  YRotate  ZDelta  shape
    0  0          0       0        0       point
    1  2.29508    0       0        0       circle Circle_Diameter=10
    2  0.25       0       0        0       circle Circle_Diameter=9.8
    3  -0.491803  0       -10      0       circle Circle_Diameter=2.75
    4  5          0       0        0       ellipse Ellipse_Height=2.5 Ellipse_Width=3
    5  0.327869   0       0        0       point

Blank "BlankGeom", child of "StackGeom"
  location (X Y Z) -0.356557 1.26623 -2.03626, rotation 0 0 0; relative location 0 0 0, rotation 0 0 0
