OpenVSP model (file version 5), 1 components.
Geometry view with OpenVSP parameter names; values to 6 digits, angles in degrees, lengths in the model's unit.
Overall bounding box: X_Min=0.00346675 X_Len=5.98557 Y_Min=-0.0269483 Y_Len=11.0991 Z_Min=-0.371071 Z_Len=1.92241

Wing "WingGeom"
  location (X Y Z) 0 0 0, rotation 0 0 0
  bounding box size 5.98557 11.0991 1.92241
  totals: TotalSpan=11.6 TotalProjectedSpan=11.0623 TotalChord=1.9 TotalArea=29.75 TotalAR=4.11345
  root: chord 6, twist 4, NACA 4-series Camber=0 CamberLoc=0.2 ThickChord=0.1
  sections:
    n  Span  Root_Chord  Tip_Chord  Area   Sweep  Sweep_Location  Dihedral  Twist  Twist_Location  tip airfoil
    1  3     6           3          13.5   0      0.25            5         0      0.25            as above
    2  8     3           1          16     0      0.25            5         0      0.25            as above
    3  0.1   1           0.5        0.075  20     1               80        0      0.25            as above
    4  0.5   0.5         0.2        0.175  20     1               80        0      0.25            as above
