OpenVSP model (file version 5), 4 components.
Geometry view with OpenVSP parameter names; values to 6 digits, angles in degrees, lengths in the model's unit.
Overall bounding box: X_Min=0 X_Len=40 Y_Min=-20 Y_Len=40 Z_Min=-2.66667 Z_Len=10.6667

Pod "Fuse"
  location (X Y Z) 0 0 0, rotation 0 0 0
  bounding box size 40 5.33333 5.33333
  Design: FineRatio=15 Length=40

Wing "Wing", child of "Fuse"
  location (X Y Z) 10 0 -1.5, rotation 0 0 0
  symmetric about XZ
  bounding box size 14.547 40 1.00058
  totals: TotalSpan=40 TotalProjectedSpan=40 TotalChord=6.5 TotalArea=260 TotalAR=6.15385
  root: chord 10, twist 0, NACA 4-series Camber=0 CamberLoc=0.2 ThickChord=0.1
  sections:
    n  Span  Root_Chord  Tip_Chord  Area  Sweep  Sweep_Location  Dihedral  Twist  Twist_Location  tip airfoil
    1  20    10          3          130   30     0               0         0      0.25            as above

Wing "Vert", child of "Fuse"
  location (X Y Z) 30 0 0, rotation 90 0 0
  bounding box size 6.6188 0.600348 8
  totals: TotalSpan=8 TotalProjectedSpan=8 TotalChord=4 TotalArea=32 TotalAR=2
  root: chord 6, twist 0, NACA 4-series Camber=0 CamberLoc=0.2 ThickChord=0.1
  sections:
    n  Span  Root_Chord  Tip_Chord  Area  Sweep  Sweep_Location  Dihedral  Twist  Twist_Location  tip airfoil
    1  8     6           2          32    30     0               0         0      0.25            as above

Wing "Horz", child of "Vert"
  location (X Y Z) 32 0 0, rotation 0 0 0; relative location 2 0 0, rotation 0 0 0
  symmetric about XZ
  bounding box size 4.18382 12 0.400232
  totals: TotalSpan=12 TotalProjectedSpan=12 TotalChord=3 TotalArea=36 TotalAR=4
  root: chord 4, twist 0, NACA 4-series Camber=0 CamberLoc=0.2 ThickChord=0.1
  sections:
    n  Span  Root_Chord  Tip_Chord  Area  Sweep  Sweep_Location  Dihedral  Twist  Twist_Location  tip airfoil
    1  6     4           2          18    20     0               0         0      0.25            as above
