OpenVSP model (file version 5), 3 components.
Geometry view with OpenVSP parameter names; values to 6 digits, angles in degrees, lengths in the model's unit.
Overall bounding box: X_Min=0 X_Len=10 Y_Min=-9 Y_Len=18 Z_Min=-0.666667 Z_Len=3.20573

Pod "PodGeom"
  location (X Y Z) 0 0 0, rotation 0 0 0
  bounding box size 10 1.33333 1.33333
  Design: FineRatio=15 Length=10

Wing "Wing", child of "PodGeom"
  location (X Y Z) 2 0 0, rotation 0 0 0
  symmetric about XZ
  bounding box size 6.19615 18 0.400232
  totals: TotalSpan=18 TotalProjectedSpan=18 TotalChord=2.5 TotalArea=45 TotalAR=7.2
  root: chord 4, twist 0, NACA 4-series Camber=0 CamberLoc=0.2 ThickChord=0.1
  sections:
    n  Span  Root_Chord  Tip_Chord  Area  Sweep  Sweep_Location  Dihedral  Twist  Twist_Location  tip airfoil
    1  9     4           1          22.5  30     0               0         0      0.25            as above

Wing "Vertical", child of "PodGeom"
  location (X Y Z) 6.95833 0 1.2e-06, rotation 90 0 0; relative location -3.04167 0 0, rotation 90 0 0
  bounding box size 2.72201 0.204285 2.53906
  totals: TotalSpan=2.53906 TotalProjectedSpan=2.53906 TotalChord=1.52083 TotalArea=3.86149 TotalAR=1.66952
  root: chord 2.04167, twist 0, NACA 4-series Camber=0 CamberLoc=0.2 ThickChord=0.1
  sections:
    n  Span     Root_Chord  Tip_Chord  Area     Sweep  Sweep_Location  Dihedral  Twist  Twist_Location  tip airfoil
    1  2.53906  2.04167     1          3.86149  15     1               0         0      0.25            as above

Parameter links (A drives B)
  Vertical:XSec_1:Root_Chord -> Vertical:XForm:X_Rel_Location Offset=-1 Scale=-1
