OpenVSP model (file version 5), 3 components.
Geometry view with OpenVSP parameter names; values to 6 digits, angles in degrees, lengths in the model's unit.
Overall bounding box: X_Min=0 X_Len=10.6667 Y_Min=-10.9275 Y_Len=21.8551 Z_Min=-0.927536 Z_Len=1.85507

Pod "PodGeom"
  location (X Y Z) 0 0 0, rotation 0 0 0
  bounding box size 10.6667 1.85507 1.85507
  Design: FineRatio=11.5 Length=10.6667

Pod "PodGeom", child of "PodGeom"
  location (X Y Z) 0 5 0, rotation 0 0 0
  symmetric about XZ
  bounding box size 10.6667 11.8551 1.85507
  Design: FineRatio=11.5 Length=10.6667

Pod "PodGeom", child of "PodGeom"
  location (X Y Z) 0 10 0, rotation 0 0 0; relative location 0 5 0, rotation 0 0 0
  symmetric about XZ
  bounding box size 10.6667 21.8551 1.85507
  Design: FineRatio=11.5 Length=10.6667

Parameter links (A drives B)
  PodGeom:Design:FineRatio -> PodGeom:Design:FineRatio Offset=0
  PodGeom:Design:Length -> PodGeom:Design:Length Offset=0
  PodGeom:Design:FineRatio -> PodGeom:Design:FineRatio Offset=0
  PodGeom:Design:Length -> PodGeom:Design:Length Offset=0
