OpenVSP model (file version 5), 4 components.
Geometry view with OpenVSP parameter names; values to 6 digits, angles in degrees, lengths in the model's unit.
Overall bounding box: X_Min=0 X_Len=30 Y_Min=-11.1026 Y_Len=22.2051 Z_Min=-2 Z_Len=11.6979

Propeller "Rotor"
  location (X Y Z) 12 0 6.30435, rotation 0 90 0
  bounding box size 22.2051 22.2051 1.56708
  Design: Diameter=30 NumBlade=4 Beta34=5.55556 UseBeta34Flag=0 Feather=0 Rotate=45 Precone=5 ReverseFlag=0 FoldAngle=0 PropMode=0 AF=78 CLi=0.4992 Chord=0.1 Solidity=0.127324 ConstructXoC=0.5 FeatherAxisXoC=0.5 FeatherOffsetXoC=0
  cross sections:
    n  RadiusFrac  shape
    0  0.1         NACA 4-series Camber=0.0390588 CamberLoc=0.4 Chord=1.5 ThickChord=0.1
    1  1           as above
  Chord along r/R (linear): 0.1: 0.1, 1: 0.1
  Twist along r/R (linear): 0.1: 20, 1: 0
  Thick along r/R (linear): 0.1: 0.1, 1: 0.1
  CLI along r/R (linear): 0.1: 0.5, 1: 0.5

Wing "Ignore", child of "Rotor"
  location (X Y Z) 2.17391 0 0, rotation 90 0 0
  bounding box size 7.59909 0.400232 9.69792
  totals: TotalSpan=9.69792 TotalProjectedSpan=9.69792 TotalChord=3 TotalArea=29.0938 TotalAR=3.23264
  root: chord 4, twist 0, NACA 4-series Camber=0 CamberLoc=0.2 ThickChord=0.1
  sections:
    n  Span     Root_Chord  Tip_Chord  Area     Sweep  Sweep_Location  Dihedral  Twist  Twist_Location  tip airfoil
    1  9.69792  4           2          29.0938  30     0               0         0      0.25            as above

Fuselage "FuselageGeom"
  location (X Y Z) 0 0 0, rotation 0 0 0
  bounding box size 30 4.09091 5.29531
  Design: Length=30
  cross sections:
    n  XLocPercent  YLocPercent  ZLocPercent  shape
    0  0            0            0            point
    1  0.25         0            0.02         ellipse Ellipse_Height=5.2 Ellipse_Width=4.09091
    2  0.5          0            0.02         as above
    3  0.956522     0            0.08         circle Circle_Diameter=1.79062
    4  1            0            0.08         point

Wing "Tail", child of "FuselageGeom"
  location (X Y Z) 24 0 2.3913, rotation 90 0 0
  bounding box size 4.3094 0.400232 4
  totals: TotalSpan=4 TotalProjectedSpan=4 TotalChord=3 TotalArea=12 TotalAR=1.33333
  root: chord 4, twist 0, NACA 4-series Camber=0 CamberLoc=0.2 ThickChord=0.1
  sections:
    n  Span  Root_Chord  Tip_Chord  Area  Sweep  Sweep_Location  Dihedral  Twist  Twist_Location  tip airfoil
    1  4     4           2          12    30     0               0         0      0.25            as above
