OpenVSP model (file version 5), 3 components.
Geometry view with OpenVSP parameter names; values to 6 digits, angles in degrees, lengths in the model's unit.
Overall bounding box: X_Min=0 X_Len=4 Y_Min=-2 Y_Len=4 Z_Min=-2 Z_Len=4

Ellipsoid "Large_Sphere"
  location (X Y Z) 1 0 0, rotation 0 0 0
  bounding box size 2 2 2
  Design: A_Radius=1 B_Radius=1 C_Radius=1

Ellipsoid "Small_Sphere", child of "Large_Sphere"
  location (X Y Z) 1.5 0 0, rotation 0 0 0
  bounding box size 1 1 1
  Design: A_Radius=0.5 B_Radius=0.5 C_Radius=0.5

Ellipsoid "Large_Sphere_2"
  location (X Y Z) 0 0 0, rotation 0 0 0
  bounding box size 4 4 4
  Design: A_Radius=2 B_Radius=2 C_Radius=2
