OpenVSP model (file version 5), 1 components.
Geometry view with OpenVSP parameter names; values to 6 digits, angles in degrees, lengths in the model's unit.
Overall bounding box: X_Min=0 X_Len=4.41154 Y_Min=-9 Y_Len=18 Z_Min=-0.200116 Z_Len=0.400232

Wing "WingGeom"
  location (X Y Z) 0 0 0, rotation 0 0 0
  symmetric about XZ
  bounding box size 4.41154 18 0.400232
  totals: TotalSpan=18 TotalProjectedSpan=18 TotalChord=3 TotalArea=54 TotalAR=6
  root: chord 4, twist 0, NACA 4-series Camber=0 CamberLoc=0.2 ThickChord=0.1
  sections:
    n  Span  Root_Chord  Tip_Chord  Area  Sweep  Sweep_Location  Dihedral  Twist  Twist_Location  tip airfoil
    1  9     4           2          27    15     0               0         0      0.25            as above
  SS_Control "Flaps": UStart=0.35 UEnd=0.55 Length_C_Start=0.25 Length_C_End=0.25 Length_Start=0.975 Length_End=0.675 LE_Flag=0 Surf_Type=2
  SS_Control "Ailerons": UStart=0.56 UEnd=0.66 Length_C_Start=0.25 Length_C_End=0.25 Length_Start=0.66 Length_End=0.51 LE_Flag=0 Surf_Type=2
  SS_Control "Slats": UStart=0.4 UEnd=0.6 Length_C_Start=0.25 Length_C_End=0.25 Length_Start=0.9 Length_End=0.6 LE_Flag=1 Surf_Type=2
