OpenVSP model (file version 5), 2 components.
Geometry view with OpenVSP parameter names; values to 6 digits, angles in degrees, lengths in the model's unit.
Overall bounding box: X_Min=-0.000819469 X_Len=9.55677 Y_Min=-8.35417 Y_Len=16.7083 Z_Min=-1.04146 Z_Len=2.08292

Wing "WingGeom"
  location (X Y Z) 0 0 0, rotation 0 0 0
  symmetric about XZ
  bounding box size 3.74452 16.7083 0.382621
  totals: TotalSpan=16.7083 TotalProjectedSpan=16.7083 TotalChord=2.42969 TotalArea=40.596 TotalAR=6.87674
  root: chord 3.35417, twist 0, NACA 4-series Camber=0.04 CamberLoc=0.4 ThickChord=0.104545
  sections:
    n  Span     Root_Chord  Tip_Chord  Area    Sweep  Sweep_Location  Dihedral  Twist  Twist_Location  tip airfoil
    1  8.35417  3.35417     1.50521    20.298  15     0               0         0      0.25            as above
  SS_Rectangle "SS_RECT_0": Center_U=0.493902 Center_W=0.768293 U_Length=0.20122 W_Length=0.268293

Stack "StackGeom"
  location (X Y Z) 5.76087 0 0, rotation 0 0 0
  bounding box size 4.14086 2.08292 2.08292
  cross sections:
    n  XDelta   YDelta  ZDelta  shape
    0  0        0       0       point
    1  0        0       0       circle Circle_Diameter=1.70421
    2  0        0       0       circle Circle_Diameter=2.08292
    3  3.29508  0       0       rounded rectangle RoundRectXSec_Radius=0.2 RoundedRect_Height=1.26238 RoundedRect_Width=1.26238
    4  0.5      0       0       point
  SS_Rectangle "SS_RECT_0": Center_U=0.125 Center_W=0.5 U_Length=0.2 W_Length=0.15
  SS_Rectangle "SS_RECT_1": Center_U=0.125 Center_W=0.25 U_Length=0.2 W_Length=0.15
