OpenVSP model (file version 5), 1 components.
Geometry view with OpenVSP parameter names; values to 6 digits, angles in degrees, lengths in the model's unit.
Overall bounding box: X_Min=0 X_Len=13.547 Y_Min=-20 Y_Len=40 Z_Min=-0.400232 Z_Len=0.800464

Wing "WingGeom"
  location (X Y Z) 0 0 0, rotation 0 0 0
  symmetric about XZ
  bounding box size 13.547 40 0.800464
  totals: TotalSpan=40 TotalProjectedSpan=40 TotalChord=5 TotalArea=200 TotalAR=8
  root: chord 8, twist 0, NACA 4-series Camber=0 CamberLoc=0.2 ThickChord=0.1
  sections:
    n  Span  Root_Chord  Tip_Chord  Area  Sweep  Sweep_Location  Dihedral  Twist  Twist_Location  tip airfoil
    1  20    8           2          100   30     0               0         0      0.25            as above

User parameters
  Design:Wing_Loading = 50  (Aircraft main wing loading)
  Weight:GW = 10000  (Gross Weight)

Advanced link "Wing_Sizer"
  input GW = UserParm:Weight:GW
  input Wing_Loading = UserParm:Design:Wing_Loading
  output S = WingGeom:WingGeom:TotalArea
    S = GW/Wing_Loading;
