OpenVSP model (file version 5), 69 components.
Geometry view with OpenVSP parameter names; values to 6 digits, angles in degrees, lengths in the model's unit.
Overall bounding box: X_Min=0 X_Len=365.253 Y_Min=-216.296 Y_Len=432.592 Z_Min=0 Z_Len=131.294

Blank "Origin"
  location (X Y Z) 0 0 0, rotation 0 0 0

Fuselage "Fuselage", child of "Origin"
  location (X Y Z) 22.6637 0 50.9924, rotation 0 0 0
  bounding box size 328.715 49.3528 55.7551
  Design: Length=328.715
  cross sections:
    n  XLocPercent  YLocPercent  ZLocPercent  shape
    0  0            0            0            point
    1  0.024145     0            -0.002082    general fuselage BotStr=0.827589 BotTanAngle=90 CornerRad=0 Height=15.505 LowStr=0.81429 MaxWidthLoc=0.024812 TopStr=1.10925 TopTanAngle=90 UpStr=0.692274 Width=17.6909
    2  0.121627     0            0.016498     general fuselage BotStr=1.19151 BotTanAngle=90 CornerRad=0 Height=33.5102 LowStr=1.27081 MaxWidthLoc=-0.117303 TopStr=0.342421 TopTanAngle=90 UpStr=1.7302 Width=37.1263
    3  0.296705     0            0.04395      general fuselage BotStr=1.42426 BotTanAngle=90 CornerRad=0 Height=52.0793 LowStr=1.42286 MaxWidthLoc=-0.190324 TopStr=1.00146 TopTanAngle=90 UpStr=2 Width=47.3885
    4  0.479564     0            0.042478     general fuselage BotStr=1.16875 BotTanAngle=90 CornerRad=0 Height=50.5893 LowStr=1.5 MaxWidthLoc=-0.125562 TopStr=1.25 TopTanAngle=90 UpStr=1.50472 Width=44.5205
    5  0.671993     0            0.03643      general fuselage BotStr=1.03404 BotTanAngle=90 CornerRad=0 Height=32.3042 LowStr=1.0683 MaxWidthLoc=-0.310309 TopStr=1.85654 TopTanAngle=90 UpStr=0.818164 Width=29.8883
    6  0.923427     0            0.041126     general fuselage BotStr=0.952476 BotTanAngle=90 CornerRad=0 Height=16.2922 LowStr=0.67819 MaxWidthLoc=-0.500607 TopStr=2 TopTanAngle=90 UpStr=1.27804 Width=10.4965
    7  1            0            0.045371     point

Fuselage "GearPod", child of "Origin"
  location (X Y Z) 151.948 20.1696 49.3765, rotation 0 0 0
  symmetric about XZ
  bounding box size 39.2922 70.0243 6.67337
  Design: Length=38.6033
  cross sections:
    n  XLocPercent  YLocPercent  ZLocPercent  shape
    0  0            0            0            point
    1  0.188638     0            -0.032472    general fuselage BotStr=0.042923 BotTanAngle=90 CornerRad=0 Height=6.64433 LowStr=1.3145 MaxWidthLoc=0.100759 TopStr=1.5606 TopTanAngle=90 UpStr=0.379586 Width=28.9178
    2  0.58526      0            -0.033286    general fuselage BotStr=0.048982 BotTanAngle=90 CornerRad=0 Height=6.5677 LowStr=1.315 MaxWidthLoc=0.100759 TopStr=1.56097 TopTanAngle=90 UpStr=0.38227 Width=28.7787
    3  0.780798     0            -0.0223388   general fuselage BotStr=0.684282 BotTanAngle=90 CornerRad=0 Height=4.84983 LowStr=0.393477 MaxWidthLoc=0.257254 TopStr=1.45842 TopTanAngle=90 UpStr=0 Width=27.0116
    4  1            0            0            point

Hinge "HorzStab-Hinge", child of "Origin"
  location (X Y Z) 334.975 0 64.8763, rotation -180 0 -90
  Hinge: JointRotMax=30 JointRotMaxFlag=1 JointRotMin=-21 JointRotMinFlag=1 JointRotate=-5 JointRotateFlag=1 JointTransMax=1000 JointTransMaxFlag=0 JointTransMin=-1000 JointTransMinFlag=0 JointTranslate=0 JointTranslateFlag=0 OrientRotFlag=1 PrimOffAbsRelFlag=1 PrimType=0 PrimULoc=0 PrimVecAbsRelFlag=1 PrimWLoc=0 PrimXOff=0 PrimXOffRel=0 PrimXVec=0 PrimXVecRel=0 PrimYOff=0 PrimYOffRel=0 PrimYVec=1 PrimYVecRel=1 PrimZOff=0 PrimZOffRel=0 PrimZVec=0 PrimZVecRel=0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

Wing "HorzStab", child of "HorzStab-Hinge"
  location (X Y Z) 327.083 0 64.1065, rotation 0 -5 0; relative location 0 -7.929 0.07908, rotation 180 0 -90
  symmetric about XZ
  bounding box size 30.5343 128.95 4.05144
  totals: TotalSpan=123.811 TotalProjectedSpan=123.811 TotalChord=30.6413 TotalArea=3793.73 TotalAR=4.04066
  root: chord 30.6413, twist 0, NACA 4-series Camber=0 CamberLoc=0.2 ThickChord=0.11
  sections:
    n  Span     Root_Chord  Tip_Chord  Area     Sweep  Sweep_Location  Dihedral  Twist  Twist_Location  tip airfoil
    1  2.42124  30.6413     30.6413    74.1899  0      0               0         0      0.25            as above
    2  5.31852  30.6413     30.6413    162.966  0      0               0         0      0.25            as above
    3  30.7602  30.6413     30.6413    942.532  0      0               0         0      0.25            as above
    4  0.12     30.6413     30.6413    3.67695  0      0               0         0      0.25            as above
    5  23.2855  30.6413     30.6413    713.498  0      0               0         0      0.25            as above

Hinge "TrimTab-Hinge", child of "HorzStab"
  location (X Y Z) 352.177 0 67.0723, rotation 0 -5 0; relative location 25.2575 0 0.7674, rotation 0 0 0
  Hinge: JointRotMax=30 JointRotMaxFlag=1 JointRotMin=-30 JointRotMinFlag=1 JointRotate=0 JointRotateFlag=1 JointTransMax=1000 JointTransMaxFlag=0 JointTransMin=-1000 JointTransMinFlag=0 JointTranslate=0 JointTranslateFlag=0 OrientRotFlag=0 PrimOffAbsRelFlag=1 PrimType=0 PrimULoc=0 PrimVecAbsRelFlag=1 PrimWLoc=0 PrimXOff=0 PrimXOffRel=0 PrimXVec=0 PrimXVecRel=0 PrimYOff=0 PrimYOffRel=0 PrimYVec=1 PrimYVecRel=1 PrimZOff=0 PrimZOffRel=0 PrimZVec=0 PrimZVecRel=0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

Wing "TrimTab", child of "TrimTab-Hinge"
  location (X Y Z) 327.085 0 64.1094, rotation 0 -5 0; relative location -25.2554 0 -0.76464, rotation 0 0 0
  symmetric about XZ
  bounding box size 5.25915 76.9999 1.03336
  totals: TotalSpan=76.9999 TotalProjectedSpan=76.9999 TotalChord=30.6413 TotalArea=2359.38 TotalAR=2.51295
  root: chord 30.6413, twist 0, NACA 4-series Camber=0 CamberLoc=0.2 ThickChord=0.11
  sections:
    n  Span  Root_Chord  Tip_Chord  Area     Sweep  Sweep_Location  Dihedral  Twist  Twist_Location  tip airfoil
    1  38.5  30.6413     30.6413    1179.69  0      0               0         0      0.25            as above

Wing "TrimTab-Tab", child of "TrimTab"
  location (X Y Z) 357.604 0 66.8428, rotation 0 -5 0; relative location -0.063052 0 0, rotation -90 -90 0
  symmetric about XZ
  bounding box size 0.0629511 76.9999 0.177163
  totals: TotalSpan=76.9999 TotalProjectedSpan=76.9999 TotalChord=0.048 TotalArea=3.696 TotalAR=1604.16
  root: chord 0.048, twist 0, rounded rectangle RoundRectXSec_Radius=0 RoundedRect_Height=0.17364 RoundedRect_Width=0.048
  sections:
    n  Span  Root_Chord  Tip_Chord  Area   Sweep  Sweep_Location  Dihedral  Twist  Twist_Location  tip airfoil
    1  38.5  0.048       0.048      1.848  0      0               0         0      0.25            as above

Wing "VertTail", child of "Origin"
  location (X Y Z) 276 0 67.464, rotation 90 0 0
  symmetric about XZ
  bounding box size 78.3628 6.25121 63.8204
  totals: TotalSpan=127.641 TotalProjectedSpan=127.641 TotalChord=52.8053 TotalArea=6047.8 TotalAR=2.69391
  root: chord 75.2748, twist 0, airfoil file "Tecnam_Vtail_Z_Z67.464_max0.562169_TE0.743854"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 BaseThickChord=0.0830421 ThickChord=0.0830421
  sections:
    n   Span     Root_Chord  Tip_Chord  Area     Sweep    Sweep_Location  Dihedral  Twist  Twist_Location  tip airfoil
    1   4.7268   75.2748     76.488     358.676  0        0               0         0      0.25            airfoil file "Tecnam_Vtail_Y2_Z72.1902_max0.588102_TE0.755265"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 BaseThickChord=0.0781229 ThickChord=0.0781229
    2   0.1188   76.488      76.518     9.08856  0        0               0         0      0.25            airfoil file "Tecnam_Vtail_Y_Z72.3088_max0.588742"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 BaseThickChord=0.0780015 ThickChord=0.0780015
    3   3.528    76.518      77.424     271.554  0        0               0         0      0.25            airfoil file "Tecnam_Vtail_LE-0_Z75.8364_max0.607554"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 BaseThickChord=0.0744338 ThickChord=0.0744338
    4   0.5868   77.424      72.5988    44.0167  83.2753  0               0         0      0.25            airfoil file "Tecnam_Vtail_LE-1_Z76.423_max0.583957"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 BaseThickChord=0.0789091 ThickChord=0.0789091
    5   1.3272   72.5988     67.002     92.6391  77.4028  0               0         0      0.25            airfoil file "Tecnam_Vtail_LE-2_Z77.75_max0.555287"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 BaseThickChord=0.0843476 ThickChord=0.0843476
    6   1.716    67.002      62.5908    111.191  70.5299  0               0         0      0.25            airfoil file "Tecnam_Vtail_A_Z79.466_max0.532368"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 BaseThickChord=0.0886952 ThickChord=0.0886952
    7   2.034    62.5908     58.8516    123.507  64.4824  0               0         0      0.25            airfoil file "Tecnam_Vtail_LE-3_Z81.5_max0.51328"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 BaseThickChord=0.0923162 ThickChord=0.0923162
    8   2.4576   58.8516     55.4424    140.444  58.6903  0               0         0      0.25            airfoil file "Tecnam_Vtail_B_Z83.9573_max0.496971"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 BaseThickChord=0.0954102 ThickChord=0.0954102
    9   5.4672   55.4424     50.2344    288.878  50.4092  0               0         0      0.25            airfoil file "Vtail - short chord"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 BaseThickChord=0.0989597 ThickChord=0.0989597
    10  0.054    50.2344     50.202     2.71178  40.7892  0               0         0      0.25            as above
    11  5.484    50.202      46.9716    266.45   40.2209  0               0         0      0.25            as above
    12  1.638    46.9716     46.0068    76.1493  40.221   0               0         0      0.25            airfoil file "Tecnam_Vtail_V_Z96.6004_TE0.94804"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 BaseThickChord=0.0989597 ThickChord=0.0989597
    13  4.8996   46.0068     43.1208    218.345  40.2209  0               0         0      0.25            airfoil file "Tecnam_Vtail_LE-5_Z101.5_TE0.944544"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 BaseThickChord=0.0989597 ThickChord=0.0989597
    14  12.9996  43.1208     35.4648    510.791  40.2209  0               0         0      0.25            airfoil file "Tecnam_Vtail_LE-6_Z114.5_TE0.932513"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 BaseThickChord=0.0989597 ThickChord=0.0989597
    15  12.6696  35.4648     28.002     402.049  40.2207  0               0         0      0.25            airfoil file "Tecnam_Vtail_D_Z127.169_TE0.914458"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 BaseThickChord=0.0989597 ThickChord=0.0989597
    16  0.24     28.002      27.84      6.70104  14.39    1               0         0      0.25            as above
    17  1.92     27.84       26.4       52.0704  14.39    1               0         0      0.25            NACA 4-series Camber=0 CamberLoc=0.2 ThickChord=0.09989
    18  1.95324  26.4        23.4       48.6357  14.39    1               0         0      0.25            NACA 4-series Camber=0 CamberLoc=0.2 ThickChord=0.057

Hinge "Rudder-Hinge", child of "VertTail"
  location (X Y Z) 354.348 0 127.308, rotation -180 71.6251 -180; relative location 78.348 0 59.844, rotation -180 71.6251 -180
  Hinge: JointRotMax=30 JointRotMaxFlag=1 JointRotMin=-30 JointRotMinFlag=1 JointRotate=5 JointRotateFlag=1 JointTransMax=1000 JointTransMaxFlag=0 JointTransMin=-1000 JointTransMinFlag=0 JointTranslate=0 JointTranslateFlag=0 OrientRotFlag=1 PrimOffAbsRelFlag=0 PrimType=1 PrimULoc=0 PrimVecAbsRelFlag=1 PrimWLoc=0 PrimXOff=336.096 PrimXOffRel=60.096 PrimXVec=-0.315233 PrimXVecRel=-0.315233 PrimYOff=0 PrimYOffRel=0 PrimYVec=0 PrimYVecRel=0 PrimZOff=72.36 PrimZOffRel=4.896 PrimZVec=-0.949014 PrimZVecRel=-0.949014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

Wing "Rudder", child of "Rudder-Hinge"
  location (X Y Z) 276.206 4.96902 72.2316, rotation 88.4202 -4.74447 -0.0654496; relative location 76.9012 0 -57.0131, rotation 90 0 108.375
  symmetric about XZ
  bounding box size 29.3444 4.03085 59.0475
  totals: TotalSpan=117.95 TotalProjectedSpan=117.95 TotalChord=49.8819 TotalArea=5312.27 TotalAR=2.61887
  root: chord 76.518, twist 0, airfoil file "Tecnam_Vtail_Y_Z72.3088_max0.588742"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 BaseThickChord=0.0780015 ThickChord=0.0780015
  sections:
    n   Span     Root_Chord  Tip_Chord  Area     Sweep    Sweep_Location  Dihedral  Twist  Twist_Location  tip airfoil
    1   3.528    76.518      77.424     271.554  0        0               0         0      0.25            airfoil file "Tecnam_Vtail_LE-0_Z75.8364_max0.607554"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 BaseThickChord=0.0744338 ThickChord=0.0744338
    2   0.5868   77.424      72.5988    44.0167  83.2753  0               0         0      0.25            airfoil file "Tecnam_Vtail_LE-1_Z76.423_max0.583957"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 BaseThickChord=0.0789091 ThickChord=0.0789091
    3   1.3272   72.5988     67.002     92.6391  77.4028  0               0         0      0.25            airfoil file "Tecnam_Vtail_LE-2_Z77.75_max0.555287"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 BaseThickChord=0.0843476 ThickChord=0.0843476
    4   1.716    67.002      62.5908    111.191  70.5299  0               0         0      0.25            airfoil file "Tecnam_Vtail_A_Z79.466_max0.532368"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 BaseThickChord=0.0886952 ThickChord=0.0886952
    5   2.034    62.5908     58.8516    123.507  64.4824  0               0         0      0.25            airfoil file "Tecnam_Vtail_LE-3_Z81.5_max0.51328"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 BaseThickChord=0.0923162 ThickChord=0.0923162
    6   2.4576   58.8516     55.4424    140.444  58.6903  0               0         0      0.25            airfoil file "Tecnam_Vtail_B_Z83.9573_max0.496971"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 BaseThickChord=0.0954102 ThickChord=0.0954102
    7   5.4672   55.4424     50.2344    288.878  50.4092  0               0         0      0.25            airfoil file "Vtail - short chord"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 BaseThickChord=0.0989597 ThickChord=0.0989597
    8   0.054    50.2344     50.202     2.71178  40.7892  0               0         0      0.25            as above
    9   5.484    50.202      46.9716    266.45   40.2209  0               0         0      0.25            as above
    10  1.638    46.9716     46.0068    76.1493  40.221   0               0         0      0.25            airfoil file "Tecnam_Vtail_V_Z96.6004_TE0.94804"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 BaseThickChord=0.0989597 ThickChord=0.0989597
    11  4.8996   46.0068     43.1208    218.345  40.2209  0               0         0      0.25            airfoil file "Tecnam_Vtail_LE-5_Z101.5_TE0.944544"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 BaseThickChord=0.0989597 ThickChord=0.0989597
    12  12.9996  43.1208     35.4648    510.791  40.2209  0               0         0      0.25            airfoil file "Tecnam_Vtail_LE-6_Z114.5_TE0.932513"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 BaseThickChord=0.0989597 ThickChord=0.0989597
    13  12.6696  35.4648     28.002     402.049  40.2207  0               0         0      0.25            airfoil file "Tecnam_Vtail_D_Z127.169_TE0.914458"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 BaseThickChord=0.0989597 ThickChord=0.0989597
    14  0.24     28.002      27.84      6.70104  14.39    1               0         0      0.25            as above
    15  1.92     27.84       26.4       52.0704  14.39    1               0         0      0.25            NACA 4-series Camber=0 CamberLoc=0.2 ThickChord=0.09989
    16  1.95324  26.4        23.4       48.6357  14.39    1               0         0      0.25            NACA 4-series Camber=0 CamberLoc=0.2 ThickChord=0.057

Stack "Rudder_TStrip", child of "Rudder"
  location (X Y Z) 356.343 -1.01173 96.6107, rotation 160.627 74.8052 18.3955; relative location 0 0 0.0156, rotation 0 0 0
  bounding box size 7.98853 1.45134 30.6258
  cross sections:
    n  XDelta  YDelta  ZDelta  shape
    0  0       0       0       point
    1  0       0       0       rounded rectangle RoundRectXSec_Radius=0 RoundedRect_Height=0.03204 RoundedRect_Width=1.26204
    2  31.576  0       0       as above
    3  0       0       0       point

Blank "Wing_Parent", child of "Origin"
  location (X Y Z) 144.849 0 86.691, rotation 0 0 0

Wing "Wing_Sec1", child of "Wing_Parent"
  location (X Y Z) 144.849 0 86.691, rotation 0 0 0; relative location 0 0 0, rotation 0 0 0
  symmetric about XZ
  bounding box size 29.7448 48 4.47112
  totals: TotalSpan=48 TotalProjectedSpan=48 TotalChord=29.1979 TotalArea=1401.5 TotalAR=1.64395
  root: chord 29.7626, twist 2, airfoil file "hccl-5.4 (new4)_Y=00.000_C=2.480219_TE-abs:4.mm_TE-z/c:.005292"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 BaseThickChord=0.149666 ThickChord=0.149666
  sections:
    n  Span  Root_Chord  Tip_Chord  Area    Sweep        Sweep_Location  Dihedral  Twist    Twist_Location  tip airfoil
    1  24    29.7626     28.6332    700.75  -0.00097868  0.7             0         1.81636  0.7             airfoil file "hccl-5.4 (new4)_Y=02.000_C=2.386101_TE-abs:4.mm_TE-z/c:.005500"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 BaseThickChord=0.149667 ThickChord=0.149667

Wing "Wing_Sec2", child of "Wing_Sec1"
  location (X Y Z) 145.639 24 86.6912, rotation 0 0 0; relative location -0.0192453 0 -0.959844, rotation 0 0 0
  symmetric about XZ
  bounding box size 25.0798 273.226 4.39729
  totals: TotalSpan=225.226 TotalProjectedSpan=225.226 TotalChord=25.9835 TotalArea=5852.16 TotalAR=8.66804
  root: chord 28.6332, twist 1.81636, airfoil file "hccl-5.4_main_CFD-cove_Y=02.000_C=2.386101_TE-abs:2.mm_TE-z/c:.002750"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 BaseThickChord=0.151973 ThickChord=0.151973
  sections:
    n  Span     Root_Chord  Tip_Chord  Area     Sweep       Sweep_Location  Dihedral  Twist     Twist_Location  tip airfoil
    1  112.613  28.6332     23.3338    2926.08  0.00137417  0.7             0         0.713376  0.7             airfoil file "hccl-5.4_main_CFD-cove_Y=11.384417_C=1.944480_TE-abs:2.mm_TE-z/c:.003375"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 BaseThickChord=0.151952 ThickChord=0.151952

Wing "Wing_Sec3", child of "Wing_Sec2"
  location (X Y Z) 149.352 136.613 86.6912, rotation 0 0 0; relative location -0.0036984 0 -0.468151, rotation 0 0 0
  symmetric about XZ
  bounding box size 17.4238 363.95 3.57559
  totals: TotalSpan=90.7239 TotalProjectedSpan=90.7239 TotalChord=22.2664 TotalArea=2020.1 TotalAR=4.07447
  root: chord 23.3338, twist 0.71338, airfoil file "hccl-5.4 (new4)_Y=11.384417_C=1.944480_TE-abs:4.mm_TE-z/c:.006749"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 BaseThickChord=0.149672 ThickChord=0.149672
  sections:
    n  Span    Root_Chord  Tip_Chord  Area     Sweep        Sweep_Location  Dihedral  Twist     Twist_Location  tip airfoil
    1  45.362  23.3338     21.1991    1010.05  -0.00226129  0.7             0         0.114096  0.7             airfoil file "hccl-5.4 (new4)_Y=15.164583_C=1.766589_TE-abs:4.mm_TE-z/c:.007429"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 BaseThickChord=0.149675 ThickChord=0.149675

Wing "Wing_Sec4", child of "Wing_Sec3"
  location (X Y Z) 150.844 181.975 86.6888, rotation 0 0 0; relative location -0.0116087 0 -0.398351, rotation 0 0 0
  symmetric about XZ
  bounding box size 21.1998 379.473 3.23824
  totals: TotalSpan=15.5234 TotalProjectedSpan=15.5234 TotalChord=21.0164 TotalArea=326.247 TotalAR=0.738634
  root: chord 21.1991, twist 0.1141, airfoil file "hccl-5.4 (new4)_Y=15.164583_C=1.766589_TE-abs:4.mm_TE-z/c:.007429"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 BaseThickChord=0.149675 ThickChord=0.149675
  sections:
    n  Span     Root_Chord  Tip_Chord  Area     Sweep  Sweep_Location  Dihedral  Twist  Twist_Location  tip airfoil
    1  7.76172  21.1991     20.8338    163.124  0      0.7             0         0      0.7             airfoil file "hccl-5.4 (new4)_Y=15.811388_C=1.736151_TE-abs:4.mm_TE-z/c:.007559"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 BaseThickChord=0.149675 ThickChord=0.149675

Blank "Wing_BL0_TE_Center", child of "Wing_Sec1"
  location (X Y Z) 174.614 0 86.5945, rotation 0 0 0; relative location 0 0 0, rotation 0 0 0

Hinge "Right_Aileron_Hinge", child of "Wing_Sec1"
  location (X Y Z) 166.848 136.826 87.0384, rotation -180 4.92088 -90.1691; relative location 21.9989 136.826 0.3474, rotation -180 4.92088 -90.1691
  Hinge: JointRotMax=30 JointRotMaxFlag=1 JointRotMin=-30 JointRotMinFlag=1 JointRotate=-5 JointRotateFlag=1 JointTransMax=1000 JointTransMaxFlag=0 JointTransMin=-1000 JointTransMinFlag=0 JointTranslate=0 JointTranslateFlag=0 OrientRotFlag=1 PrimOffAbsRelFlag=0 PrimType=1 PrimULoc=0 PrimVecAbsRelFlag=1 PrimWLoc=0 PrimXOff=166.716 PrimXOffRel=21.8668 PrimXVec=-0.00294097 PrimXVecRel=-0.00294097 PrimYOff=181.753 PrimYOffRel=181.753 PrimYVec=0.999996 PrimYVecRel=0.999996 PrimZOff=87.027 PrimZOffRel=0.336024 PrimZVec=-0.00025321 PrimZVecRel=-0.00025321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

Wing "Rt_Aileron", child of "Right_Aileron_Hinge"
  location (X Y Z) 149.442 136.613 85.2275, rotation 0.0148535 -4.80253 0.00122369; relative location -0.161254 -17.4583 -1.21514, rotation -174.882 -0.0151506 -90.1691
  bounding box size 6.99485 45.3625 1.98816
  totals: TotalSpan=45.362 TotalProjectedSpan=45.362 TotalChord=22.2664 TotalArea=1010.05 TotalAR=2.03724
  root: chord 23.3338, twist 0.71338, airfoil file "hccl-5.4 (new4)_Y=11.384417_C=1.944480_TE-abs:4.mm_TE-z/c:.006749"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 BaseThickChord=0.149672 ThickChord=0.149672
  sections:
    n  Span    Root_Chord  Tip_Chord  Area     Sweep        Sweep_Location  Dihedral  Twist     Twist_Location  tip airfoil
    1  45.362  23.3338     21.1991    1010.05  -0.00226129  0.7             0         0.114096  0.7             airfoil file "hccl-5.4 (new4)_Y=15.164583_C=1.766589_TE-abs:4.mm_TE-z/c:.007429"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 BaseThickChord=0.149675 ThickChord=0.149675

Hinge "Left_Aileron_Hinge", child of "Wing_Sec1"
  location (X Y Z) 166.848 -136.824 87.0384, rotation -180 4.92088 90.1691; relative location 21.9989 -136.824 0.3474, rotation -180 4.92088 90.1691
  Hinge: JointRotMax=30 JointRotMaxFlag=1 JointRotMin=-30 JointRotMinFlag=1 JointRotate=-5 JointRotateFlag=1 JointTransMax=1000 JointTransMaxFlag=0 JointTransMin=-1000 JointTransMinFlag=0 JointTranslate=0 JointTranslateFlag=0 OrientRotFlag=1 PrimOffAbsRelFlag=0 PrimType=1 PrimULoc=0 PrimVecAbsRelFlag=1 PrimWLoc=0 PrimXOff=166.716 PrimXOffRel=21.8668 PrimXVec=-0.00294084 PrimXVecRel=-0.00294084 PrimYOff=-181.753 PrimYOffRel=-181.753 PrimYVec=-0.999996 PrimYVecRel=-0.999996 PrimZOff=87.027 PrimZOffRel=0.336024 PrimZVec=-0.000253198 PrimZVecRel=-0.000253198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

Wing "Lt_Aileron", child of "Left_Aileron_Hinge"
  location (X Y Z) 149.392 -136.614 88.2777, rotation -179.985 -5.19743 -0.00132894; relative location -0.159215 17.4583 -1.21514, rotation -5.11831 0.0151503 -90.1691
  bounding box size 6.74076 45.3628 2.86433
  totals: TotalSpan=45.362 TotalProjectedSpan=45.362 TotalChord=22.2664 TotalArea=1010.05 TotalAR=2.03724
  root: chord 23.3338, twist -0.71338, airfoil file "hccl-5.4 (new4)_Y=11.384417_C=1.944480_TE-abs:4.mm_TE-z/c:.006749"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 BaseThickChord=0.149672 Invert=1 ThickChord=0.149672
  sections:
    n  Span    Root_Chord  Tip_Chord  Area     Sweep        Sweep_Location  Dihedral  Twist    Twist_Location  tip airfoil
    1  45.362  23.3338     21.1991    1010.05  -0.00226129  0.7             0         -0.1141  0.7             airfoil file "hccl-5.4 (new4)_Y=15.164583_C=1.766589_TE-abs:4.mm_TE-z/c:.007429"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 BaseThickChord=0.149675 Invert=1 ThickChord=0.149675

Hinge "Flap_Hinge", child of "Wing_Parent"
  location (X Y Z) 168.738 34.98 81.309, rotation -180 -57.4074 -90.4573; relative location 23.8888 34.98 -5.38198, rotation -180 -57.4074 -90.4573
  Hinge: JointRotMax=30 JointRotMaxFlag=1 JointRotMin=0 JointRotMinFlag=1 JointRotate=0 JointRotateFlag=1 JointTransMax=1000 JointTransMaxFlag=0 JointTransMin=-1000 JointTransMinFlag=0 JointTranslate=0 JointTranslateFlag=0 OrientRotFlag=1 PrimOffAbsRelFlag=0 PrimType=1 PrimULoc=0 PrimVecAbsRelFlag=1 PrimWLoc=0 PrimXOff=168.348 PrimXOffRel=23.4988 PrimXVec=-0.0042988 PrimXVecRel=-0.0042988 PrimYOff=125.7 PrimYOffRel=125.7 PrimYVec=0.999968 PrimYVecRel=0.999968 PrimZOff=81.919 PrimZOffRel=-4.77198 PrimZVec=0.00672377 PrimZVecRel=0.00672377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

Wing "Flap", child of "Flap_Hinge"
  location (X Y Z) 145.643 24.141 86.704, rotation 0 0 0; relative location -10.7031 -17.0718 16.552, rotation 122.593 0.385247 -90.2463
  symmetric about XZ
  bounding box size 7.41665 273.226 1.63179
  totals: TotalSpan=224.944 TotalProjectedSpan=224.944 TotalChord=25.9802 TotalArea=5844.09 TotalAR=8.6583
  root: chord 28.6266, twist 1.89773, airfoil file "hccl-5.4_flapf_Y=2.011750_C=2.385549_TE-abs:4.mm_TE-z/c:.005502"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 BaseThickChord=0.0343544 ThickChord=0.0343544
  sections:
    n  Span     Root_Chord  Tip_Chord  Area     Sweep  Sweep_Location  Dihedral  Twist     Twist_Location  tip airfoil
    1  112.472  28.6266     23.3338    2922.04  0      0.7             0         0.832697  0.7             airfoil file "hccl-5.4_flapf_Y=11.384417_C=1.944480_TE-abs:4.mm_TE-z/c:.006749"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 BaseThickChord=0.0322658 ThickChord=0.0322658

Stack "Flap_Cover_7", child of "Flap_Hinge"
  location (X Y Z) 166.213 34.9727 83.0993, rotation 0.176315 -33.9999 0.0950028; relative location 0.0155723 -2.86852 1.16315, rotation 88.5926 0.310945 -89.9924
  symmetric about XZ
  bounding box size 7.58573 72.3425 7.59045
  cross sections:
    n  XDelta    YDelta  YRotate  ZDelta     shape
    0  0         0       0        0          point
    1  0         0       0        0          general fuselage BotStr=1.3 BotTanAngle=90 CornerRad=0 Height=6.72 LowStr=0 MaxWidthLoc=1 TopStr=0 TopTanAngle=90 UpStr=0 Width=2.1211
    2  1.89775   0       19.6364  -0.545594  general fuselage BotStr=1.83678 BotTanAngle=90 CornerRad=0 Height=7.02 LowStr=0 MaxWidthLoc=1 TopStr=0 TopTanAngle=90 UpStr=0 Width=2.17334
    3  2.24475   0       31       -0.376537  general fuselage BotStr=2 BotTanAngle=90 CornerRad=0 Height=7.03035 LowStr=2 MaxWidthLoc=1 TopStr=0 TopTanAngle=90 UpStr=0 Width=1.08761
    4  0.485387  0       -90      3.60015    ellipse Ellipse_Height=0 Ellipse_Width=0.247807

Stack "Flap_Cover_9", child of "Flap_Hinge"
  location (X Y Z) 166.335 80.34 83.262, rotation 0 -34 0; relative location 45.382 -2.57776 0.972574, rotation 88.5925 0.457117 -89.9888
  symmetric about XZ
  bounding box size 6.95208 163.078 7.02799
  cross sections:
    n  XDelta    YDelta  YRotate  ZDelta     shape
    0  0         0       0        0          point
    1  0         0       0        0          general fuselage BotStr=1.3 BotTanAngle=90 CornerRad=0 Height=5.87625 LowStr=0 MaxWidthLoc=1 TopStr=0 TopTanAngle=90 UpStr=0 Width=2.15519
    2  1.70948   0       19.6364  -0.407275  general fuselage BotStr=1.83678 BotTanAngle=90 CornerRad=0 Height=6.6 LowStr=0 MaxWidthLoc=1 TopStr=0 TopTanAngle=90 UpStr=0 Width=2.18186
    3  2.16406   0       31       -0.376537  general fuselage BotStr=2 BotTanAngle=90 CornerRad=0 Height=6.40819 LowStr=2 MaxWidthLoc=1 TopStr=0 TopTanAngle=90 UpStr=0 Width=1.08761
    4  0.485387  0       -90      3.32351    ellipse Ellipse_Height=0 Ellipse_Width=0.247807

Stack "Flap_Cover_11", child of "Flap_Hinge"
  location (X Y Z) 166.009 125.7 83.915, rotation 0 -34 0; relative location 90.7464 -2.94151 0.895491, rotation 88.5925 0.457117 -89.9888
  symmetric about XZ
  bounding box size 6.71709 253.866 6.54181
  cross sections:
    n  XDelta    YDelta  YRotate  ZDelta     shape
    0  0         0       0        0          point
    1  0         0       0        0          general fuselage BotStr=1.3 BotTanAngle=90 CornerRad=0 Height=5.34784 LowStr=0 MaxWidthLoc=1 TopStr=0 TopTanAngle=90 UpStr=0 Width=2.24894
    2  1.64416   0       19.6364  -0.845287  general fuselage BotStr=1.83678 BotTanAngle=90 CornerRad=0 Height=6.1142 LowStr=0 MaxWidthLoc=1 TopStr=0 TopTanAngle=90 UpStr=0 Width=2.22447
    3  1.93353   0       31       -0.376537  general fuselage BotStr=2 BotTanAngle=90 CornerRad=0 Height=6.00762 LowStr=2 MaxWidthLoc=1 TopStr=0 TopTanAngle=90 UpStr=0 Width=1.08761
    4  0.485387  0       -90      3.13909    ellipse Ellipse_Height=0 Ellipse_Width=0.247807

Wing "Pylon_07", child of "Wing_Parent"
  location (X Y Z) 147.19 34.98 87.291, rotation -90 0 0; relative location 2.34087 34.98 0.6, rotation -90 0 0
  symmetric about XZ
  bounding box size 21.2 73.5869 3
  totals: TotalSpan=6 TotalProjectedSpan=6 TotalChord=21.2 TotalArea=127.2 TotalAR=0.283018
  root: chord 21.2, twist 0, airfoil file "pylon7_tovc-0.17099_xcmaxtoc-0.38915_te_thick-0.09346"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 BaseThickChord=0.171042 ThickChord=0.171042
  sections:
    n  Span  Root_Chord  Tip_Chord  Area     Sweep  Sweep_Location  Dihedral  Twist  Twist_Location  tip airfoil
    1  3     21.2        21.2       63.6001  0      0               0         0      0.25            as above

Fuselage "HL_Spinner", child of "Pylon_07"
  location (X Y Z) 129.826 34.98 82.491, rotation 0 0 0; relative location -17.364 0 -4.8, rotation 0 0 0
  symmetric about XZ
  bounding box size 8.4 76.32 6.36
  Design: Length=8.4
  cross sections:
    n  XLocPercent  YLocPercent  ZLocPercent  shape
    0  0            0            0            point
    1  0.714286     0            0            circle Circle_Diameter=6.12
    2  1            0            0            circle Circle_Diameter=6.36
    3  1            0            0            point

Propeller "HL-Prop", child of "HL_Spinner"
  location (X Y Z) 135.826 34.98 82.491, rotation 0 0 0; relative location 6 0 0, rotation 0 0 0
  symmetric about XZ
  bounding box size 9.05057 77.0861 7.01417
  Design: Diameter=22.674 NumBlade=5 Beta34=27.3508 UseBeta34Flag=0 Feather=0 Rotate=0 Precone=0 ReverseFlag=0 FoldAngle=95.8 PropMode=0 AF=88.8008 CLi=0 Chord=0.159309 Solidity=0.253548 ConstructXoC=0.5 FeatherAxisXoC=0.5 FeatherOffsetXoC=0
  cross sections:
    n  RadiusFrac  shape
    0  0.20238     airfoil file "MH 114  13.02%"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 BaseThickChord=0.130507 Chord=1.48231 ThickChord=0.130507
    1  1           airfoil file "MH 114  13.02%"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 BaseThickChord=0.130507 Chord=0.234789 ThickChord=0.130507
  Chord along r/R (PCHIP): 0.20238: 0.13075, 0.20949: 0.13826, 0.22302: 0.15592, 0.24183: 0.17996, 0.26472: 0.20629, 0.29061: 0.23252, 0.31863: 0.2513, 0.34811: 0.25606, 0.37855: 0.2487, 0.40957: 0.23683, 0.44087: 0.22226, 0.47223: 0.2032, 0.50345: 0.18641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
  Twist along r/R (PCHIP): 0.20238: 69.838, 0.20949: 68.892, 0.22302: 67.101, 0.24183: 64.648, 0.26472: 61.758, 0.29061: 58.582, 0.31863: 55.211, 0.34811: 51.651, 0.37855: 48.04, 0.40957: 44.752, 0.44087: 41.977, 0.47223: 39.596, 0.50345: 37.492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
  Rake along r/R (PCHIP): 0.20238: -0.0537394, 0.20949: -0.0515495, 0.22302: -0.0472413, 0.24183: -0.0422592, 0.26472: -0.0384137, 0.29061: -0.0369596, 0.31863: -0.0386142, 0.34811: -0.0426084, 0.37855: -0.0469638, 0.40957: -0.0500138, 0.44087: -0.0507984, 0.47223: -0.0502329, 0.50345: -0.0500241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
  Skew along r/R (PCHIP): 0.20238: 0.126043, 0.20949: 0.122793, 0.22302: 0.116549, 0.24183: 0.107814, 0.26472: 0.09727, 0.29061: 0.0853985, 0.31863: 0.072512, 0.34811: 0.0586314, 0.37855: 0.0443212, 0.40957: 0.0311363, 0.44087: 0.0199271, 0.47223: 0.0102711, 0.50345: 0.00172324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
  Thick along r/R (linear): 0.20238: 0.130507, 1: 0.130507

Fuselage "HL_Motor", child of "HL_Spinner"
  location (X Y Z) 138.226 34.98 82.491, rotation 0 0 0; relative location 0 0 0, rotation 0 0 0
  symmetric about XZ
  bounding box size 2.64 76.32 6.36
  Design: Length=2.64
  cross sections:
    n  XLocPercent  YLocPercent  ZLocPercent  shape
    0  0            0            0            point
    1  0            0            0            circle Circle_Diameter=6.36
    2  1            0            0            as above
    3  1            0            0            point

Fuselage "HL_Motor_Controller_Interface", child of "HL_Motor"
  location (X Y Z) 140.866 34.98 82.491, rotation 0 0 0; relative location 0 0 0, rotation 0 0 0
  symmetric about XZ
  bounding box size 2.409 76.32 6.36
  Design: Length=2.409
  cross sections:
    n  XLocPercent  YLocPercent  ZLocPercent  shape
    0  0            0            0            point
    1  0            0            0            circle Circle_Diameter=6.36
    2  1            0            0            as above
    3  1            0            0            point

Fuselage "HLNacelle_7_Tail", child of "HL_Motor_Controller_Interface"
  location (X Y Z) 143.275 34.98 82.491, rotation 0 0 0; relative location 0 9.54001e-06 0, rotation 0 0 0
  symmetric about XZ
  bounding box size 25.2922 76.3201 6.45399
  Design: Length=25.2922
  cross sections:
    n  XLocPercent  YLocPercent  ZLocPercent  shape
    0  0            0            0            point
    1  0            0            0            circle Circle_Diameter=6.36
    2  0.0593069    0            0            as above
    3  0.261667     0            0            as above
    4  1            0            0.0190541    general fuselage BotStr=1.4107 BotTanAngle=90 CornerRad=0 Height=5.39628 LowStr=0.1 MaxWidthLoc=0.5 TopStr=1.6667 TopTanAngle=90 UpStr=0.856773 Width=1.956
    5  1            0            0.0216067    point

Wing "Pylon_08", child of "Wing_Parent"
  location (X Y Z) 147.935 57.66 87.291, rotation -90 0 0; relative location 3.08595 57.66 0.6, rotation -90 0 0
  symmetric about XZ
  bounding box size 18.5964 118.947 3.6
  totals: TotalSpan=7.2 TotalProjectedSpan=7.2 TotalChord=18.5 TotalArea=133.2 TotalAR=0.389188
  root: chord 18.5, twist 0, airfoil file "pylon8_tovc-0.19595_xcmaxtoc-0.44594_te_thick-0.01363"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 BaseThickChord=0.196027 ThickChord=0.196027
  sections:
    n  Span  Root_Chord  Tip_Chord  Area     Sweep  Sweep_Location  Dihedral  Twist  Twist_Location  tip airfoil
    1  3.6   18.5        18.5       66.6001  0      0               0         0      0.25            as above

Fuselage "HL_Spinner", child of "Pylon_08"
  location (X Y Z) 131.807 57.66 82.491, rotation 0 0 0; relative location -16.128 0 -4.8, rotation 0 0 0
  symmetric about XZ
  bounding box size 8.4 121.68 6.36
  Design: Length=8.4
  cross sections:
    n  XLocPercent  YLocPercent  ZLocPercent  shape
    0  0            0            0            point
    1  0.714286     0            0            circle Circle_Diameter=6.12
    2  1            0            0            circle Circle_Diameter=6.36
    3  1            0            0            point

Propeller "HL-Prop", child of "HL_Spinner"
  location (X Y Z) 137.807 57.66 82.491, rotation 0 0 0; relative location 6 0 0, rotation 0 0 0
  symmetric about XZ
  bounding box size 9.05057 122.446 7.01417
  Design: Diameter=22.674 NumBlade=5 Beta34=27.3508 UseBeta34Flag=0 Feather=0 Rotate=0 Precone=0 ReverseFlag=0 FoldAngle=95.8 PropMode=0 AF=88.8008 CLi=0 Chord=0.159309 Solidity=0.253548 ConstructXoC=0.5 FeatherAxisXoC=0.5 FeatherOffsetXoC=0
  cross sections:
    n  RadiusFrac  shape
    0  0.20238     airfoil file "MH 114  13.02%"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 BaseThickChord=0.130507 Chord=1.48231 ThickChord=0.130507
    1  1           airfoil file "MH 114  13.02%"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 BaseThickChord=0.130507 Chord=0.234789 ThickChord=0.130507
  blade curves as in "HL-Prop"

Fuselage "HL_Motor", child of "HL_Spinner"
  location (X Y Z) 140.207 57.66 82.491, rotation 0 0 0; relative location 0 0 0, rotation 0 0 0
  symmetric about XZ
  bounding box size 2.64 121.68 6.36
  Design: Length=2.64
  cross sections:
    n  XLocPercent  YLocPercent  ZLocPercent  shape
    0  0            0            0            point
    1  0            0            0            circle Circle_Diameter=6.36
    2  1            0            0            as above
    3  1            0            0            point

Fuselage "HL_Motor_Controller_Interface", child of "HL_Motor"
  location (X Y Z) 142.847 57.66 82.491, rotation 0 0 0; relative location 0 0 0, rotation 0 0 0
  symmetric about XZ
  bounding box size 2.409 121.68 6.36
  Design: Length=2.409
  cross sections:
    n  XLocPercent  YLocPercent  ZLocPercent  shape
    0  0            0            0            point
    1  0            0            0            circle Circle_Diameter=6.36
    2  1            0            0            as above
    3  1            0            0            point

Fuselage "HLNacelle_8_Tail", child of "HL_Motor_Controller_Interface"
  location (X Y Z) 145.256 57.66 82.491, rotation 0 0 0; relative location 0 9.54001e-06 0, rotation 0 0 0
  symmetric about XZ
  bounding box size 21.3619 121.68 7.14641
  Design: Length=21.3305
  cross sections:
    n  XLocPercent  YLocPercent  ZLocPercent  shape
    0  0            0            0            point
    1  0            0            0            circle Circle_Diameter=6.36
    2  0.0703219    0            0            as above
    3  0.310266     0            0            as above
    4  0.995348     0            0.06109      ellipse Ellipse_Height=3.33 Ellipse_Width=0.25212
    5  1            0            0.06109      point

Wing "Pylon_09", child of "Wing_Parent"
  location (X Y Z) 148.679 80.34 87.291, rotation -90 0 0; relative location 3.82995 80.34 0.6, rotation -90 0 0
  symmetric about XZ
  bounding box size 19.6 164.306 3
  totals: TotalSpan=6 TotalProjectedSpan=6 TotalChord=19.6 TotalArea=117.6 TotalAR=0.306123
  root: chord 19.6, twist 0, airfoil file "pylon9_tovc-0.18495_xcmaxtoc-0.42092_te_thick-0.10204"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 BaseThickChord=0.185009 ThickChord=0.185009
  sections:
    n  Span  Root_Chord  Tip_Chord  Area     Sweep  Sweep_Location  Dihedral  Twist  Twist_Location  tip airfoil
    1  3     19.6        19.6       58.7999  0      0               0         0      0.25            as above

Fuselage "HL_Spinner", child of "Pylon_09"
  location (X Y Z) 129.827 80.34 82.491, rotation 0 0 0; relative location -18.852 0 -4.8, rotation 0 0 0
  symmetric about XZ
  bounding box size 8.4 167.04 6.36
  Design: Length=8.4
  cross sections:
    n  XLocPercent  YLocPercent  ZLocPercent  shape
    0  0            0            0            point
    1  0.714286     0            0            circle Circle_Diameter=6.12
    2  1            0            0            circle Circle_Diameter=6.36
    3  1            0            0            point

Propeller "HL-Prop", child of "HL_Spinner"
  location (X Y Z) 135.827 80.34 82.491, rotation 0 0 0; relative location 6 0 0, rotation 0 0 0
  symmetric about XZ
  bounding box size 9.05057 167.806 7.01417
  Design: Diameter=22.674 NumBlade=5 Beta34=27.3508 UseBeta34Flag=0 Feather=0 Rotate=0 Precone=0 ReverseFlag=0 FoldAngle=95.8 PropMode=0 AF=88.8008 CLi=0 Chord=0.159309 Solidity=0.253548 ConstructXoC=0.5 FeatherAxisXoC=0.5 FeatherOffsetXoC=0
  cross sections:
    n  RadiusFrac  shape
    0  0.20238     airfoil file "MH 114  13.02%"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 BaseThickChord=0.130507 Chord=1.48231 ThickChord=0.130507
    1  1           airfoil file "MH 114  13.02%"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 BaseThickChord=0.130507 Chord=0.234789 ThickChord=0.130507
  blade curves as in "HL-Prop"

Fuselage "HL_Motor", child of "HL_Spinner"
  location (X Y Z) 138.227 80.34 82.491, rotation 0 0 0; relative location 0 0 0, rotation 0 0 0
  symmetric about XZ
  bounding box size 2.64 167.04 6.36
  Design: Length=2.64
  cross sections:
    n  XLocPercent  YLocPercent  ZLocPercent  shape
    0  0            0            0            point
    1  0            0            0            circle Circle_Diameter=6.36
    2  1            0            0            as above
    3  1            0            0            point

Fuselage "HL_Motor_Controller_Interface", child of "HL_Motor"
  location (X Y Z) 140.867 80.34 82.491, rotation 0 0 0; relative location 0 0 0, rotation 0 0 0
  symmetric about XZ
  bounding box size 2.409 167.04 6.36
  Design: Length=2.409
  cross sections:
    n  XLocPercent  YLocPercent  ZLocPercent  shape
    0  0            0            0            point
    1  0            0            0            circle Circle_Diameter=6.36
    2  1            0            0            as above
    3  1            0            0            point

Fuselage "HLNacelle_9_Tail", child of "HL_Motor_Controller_Interface"
  location (X Y Z) 143.276 80.34 82.491, rotation 0 0 0; relative location 0 9.54001e-06 0, rotation 0 0 0
  symmetric about XZ
  bounding box size 25.2715 167.04 6.44471
  Design: Length=25.2715
  cross sections:
    n  XLocPercent  YLocPercent  ZLocPercent  shape
    0  0            0            0            point
    1  0            0            0            circle Circle_Diameter=6.36
    2  0.0593554    0            0            as above
    3  0.261881     0            0            as above
    4  1            0            0.0283196    general fuselage BotStr=1.4107 BotTanAngle=90 CornerRad=0 Height=4.92852 LowStr=0.1 MaxWidthLoc=0.5 TopStr=1.6667 TopTanAngle=90 UpStr=0.856773 Width=1.98
    5  1            0            0.0283196    point

Wing "Pylon_10", child of "Wing_Parent"
  location (X Y Z) 149.423 103.02 87.291, rotation -90 0 0; relative location 4.57395 103.02 0.6, rotation -90 0 0
  symmetric about XZ
  bounding box size 18.6965 209.667 3.6
  totals: TotalSpan=7.2 TotalProjectedSpan=7.2 TotalChord=18.6 TotalArea=133.92 TotalAR=0.387097
  root: chord 18.6, twist 0, airfoil file "pylon10_tovc-0.19489_xcmaxtoc-0.44355_te_thick-0.01355"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 BaseThickChord=0.194966 ThickChord=0.194966
  sections:
    n  Span  Root_Chord  Tip_Chord  Area   Sweep  Sweep_Location  Dihedral  Twist  Twist_Location  tip airfoil
    1  3.6   18.6        18.6       66.96  0      0               0         0      0.25            as above

Fuselage "HL_Spinner", child of "Pylon_10"
  location (X Y Z) 133.295 103.02 82.491, rotation 0 0 0; relative location -16.128 0 -4.8, rotation 0 0 0
  symmetric about XZ
  bounding box size 8.4 212.4 6.36
  Design: Length=8.4
  cross sections:
    n  XLocPercent  YLocPercent  ZLocPercent  shape
    0  0            0            0            point
    1  0.714286     0            0            circle Circle_Diameter=6.12
    2  1            0            0            circle Circle_Diameter=6.36
    3  1            0            0            point

Propeller "HL-Prop", child of "HL_Spinner"
  location (X Y Z) 139.295 103.02 82.491, rotation 0 0 0; relative location 6 0 0, rotation 0 0 0
  symmetric about XZ
  bounding box size 9.05057 213.166 7.01417
  Design: Diameter=22.674 NumBlade=5 Beta34=27.3508 UseBeta34Flag=0 Feather=0 Rotate=0 Precone=0 ReverseFlag=0 FoldAngle=95.8 PropMode=0 AF=88.8008 CLi=0 Chord=0.159309 Solidity=0.253548 ConstructXoC=0.5 FeatherAxisXoC=0.5 FeatherOffsetXoC=0
  cross sections:
    n  RadiusFrac  shape
    0  0.20238     airfoil file "MH 114  13.02%"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 BaseThickChord=0.130507 Chord=1.48231 ThickChord=0.130507
    1  1           airfoil file "MH 114  13.02%"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 BaseThickChord=0.130507 Chord=0.234789 ThickChord=0.130507
  blade curves as in "HL-Prop"

Fuselage "HL_Motor", child of "HL_Spinner"
  location (X Y Z) 141.695 103.02 82.491, rotation 0 0 0; relative location 0 0 0, rotation 0 0 0
  symmetric about XZ
  bounding box size 2.64 212.4 6.36
  Design: Length=2.64
  cross sections:
    n  XLocPercent  YLocPercent  ZLocPercent  shape
    0  0            0            0            point
    1  0            0            0            circle Circle_Diameter=6.36
    2  1            0            0            as above
    3  1            0            0            point

Fuselage "HL_Motor_Controller_Interface", child of "HL_Motor"
  location (X Y Z) 144.335 103.02 82.491, rotation 0 0 0; relative location 0 0 0, rotation 0 0 0
  symmetric about XZ
  bounding box size 2.409 212.4 6.36
  Design: Length=2.409
  cross sections:
    n  XLocPercent  YLocPercent  ZLocPercent  shape
    0  0            0            0            point
    1  0            0            0            circle Circle_Diameter=6.36
    2  1            0            0            as above
    3  1            0            0            point

Fuselage "HLNacelle_10_Tail", child of "HL_Motor_Controller_Interface"
  location (X Y Z) 146.744 103.02 82.491, rotation 0 0 0; relative location 0 9.54001e-06 0, rotation 0 0 0
  symmetric about XZ
  bounding box size 21.4341 212.4 7.15122
  Design: Length=21.4031
  cross sections:
    n  XLocPercent  YLocPercent  ZLocPercent  shape
    0  0            0            0            point
    1  0            0            0            circle Circle_Diameter=6.36
    2  0.0700834    0            0            as above
    3  0.309213     0            0            as above
    4  0.995346     0            0.0611071    ellipse Ellipse_Height=3.33 Ellipse_Width=0.25212
    5  1            0            0.0611071    point

Wing "Pylon_11", child of "Wing_Parent"
  location (X Y Z) 150.168 125.7 87.291, rotation -90 0 0; relative location 5.31891 125.7 0.6, rotation -90 0 0
  symmetric about XZ
  bounding box size 18.1 255.027 3
  totals: TotalSpan=6 TotalProjectedSpan=6 TotalChord=18.1 TotalArea=108.6 TotalAR=0.331492
  root: chord 18.1, twist 0, airfoil file "pylon11_tovc-0.20028_xcmaxtoc-0.45580_te_thick-0.11050"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 BaseThickChord=0.20035 ThickChord=0.20035
  sections:
    n  Span  Root_Chord  Tip_Chord  Area     Sweep  Sweep_Location  Dihedral  Twist  Twist_Location  tip airfoil
    1  3     18.1        18.1       54.2999  0      0               0         0      0.25            as above

Fuselage "HL_Spinner", child of "Pylon_11"
  location (X Y Z) 131.316 125.7 82.491, rotation 0 0 0; relative location -18.852 0 -4.8, rotation 0 0 0
  symmetric about XZ
  bounding box size 8.4 257.76 6.36
  Design: Length=8.4
  cross sections:
    n  XLocPercent  YLocPercent  ZLocPercent  shape
    0  0            0            0            point
    1  0.714286     0            0            circle Circle_Diameter=6.12
    2  1            0            0            circle Circle_Diameter=6.36
    3  1            0            0            point

Propeller "HL-Prop", child of "HL_Spinner"
  location (X Y Z) 137.316 125.7 82.491, rotation 0 0 0; relative location 6 0 0, rotation 0 0 0
  symmetric about XZ
  bounding box size 9.05057 258.526 7.01417
  Design: Diameter=22.674 NumBlade=5 Beta34=27.3508 UseBeta34Flag=0 Feather=0 Rotate=0 Precone=0 ReverseFlag=0 FoldAngle=95.8 PropMode=0 AF=88.8008 CLi=0 Chord=0.159309 Solidity=0.253548 ConstructXoC=0.5 FeatherAxisXoC=0.5 FeatherOffsetXoC=0
  cross sections:
    n  RadiusFrac  shape
    0  0.20238     airfoil file "MH 114  13.02%"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 BaseThickChord=0.130507 Chord=1.48231 ThickChord=0.130507
    1  1           airfoil file "MH 114  13.02%"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 BaseThickChord=0.130507 Chord=0.234789 ThickChord=0.130507
  blade curves as in "HL-Prop"

Fuselage "HL_Motor", child of "HL_Spinner"
  location (X Y Z) 139.716 125.7 82.491, rotation 0 0 0; relative location 0 0 0, rotation 0 0 0
  symmetric about XZ
  bounding box size 2.64 257.76 6.36
  Design: Length=2.64
  cross sections:
    n  XLocPercent  YLocPercent  ZLocPercent  shape
    0  0            0            0            point
    1  0            0            0            circle Circle_Diameter=6.36
    2  1            0            0            as above
    3  1            0            0            point

Fuselage "HL_Motor_Controller_Interface", child of "HL_Motor"
  location (X Y Z) 142.356 125.7 82.491, rotation 0 0 0; relative location 0 0 0, rotation 0 0 0
  symmetric about XZ
  bounding box size 2.409 257.76 6.36
  Design: Length=2.409
  cross sections:
    n  XLocPercent  YLocPercent  ZLocPercent  shape
    0  0            0            0            point
    1  0            0            0            circle Circle_Diameter=6.36
    2  1            0            0            as above
    3  1            0            0            point

Fuselage "HLNacelle_11_Tail", child of "HL_Motor_Controller_Interface"
  location (X Y Z) 144.765 125.7 82.491, rotation 0 0 0; relative location 0 9.54001e-06 0, rotation 0 0 0
  symmetric about XZ
  bounding box size 23.7218 257.76 6.44109
  Design: Length=23.7218
  cross sections:
    n  XLocPercent  YLocPercent  ZLocPercent  shape
    0  0            0            0            point
    1  0            0            0            circle Circle_Diameter=6.36
    2  0.0632329    0            0            as above
    3  0.278988     0            0            as above
    4  1            0            0.0398924    general fuselage BotStr=1.4107 BotTanAngle=90 CornerRad=0 Height=4.46724 LowStr=0.1 MaxWidthLoc=0.5 TopStr=1.6667 TopTanAngle=90 UpStr=0.856773 Width=2.004
    5  1            0            0.0398924    point

Wing "Pylon_12", child of "Wing_Parent"
  location (X Y Z) 150.912 148.38 87.291, rotation -90 0 0; relative location 6.06291 148.38 0.6, rotation -90 0 0
  symmetric about XZ
  bounding box size 18.7968 300.387 3.6
  totals: TotalSpan=7.2 TotalProjectedSpan=7.2 TotalChord=18.7 TotalArea=134.64 TotalAR=0.385028
  root: chord 18.7, twist 0, airfoil file "pylon12_tovc-0.19385_xcmaxtoc-0.44118_te_thick-0.01348"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 BaseThickChord=0.193925 ThickChord=0.193925
  sections:
    n  Span  Root_Chord  Tip_Chord  Area     Sweep  Sweep_Location  Dihedral  Twist  Twist_Location  tip airfoil
    1  2.58  18.7        18.7       48.2459  0      0               0         0      0.25            as above
    2  1.02  18.7        18.7       19.074   0      0               0         0      0.25            as above

Fuselage "HL_Spinner", child of "Pylon_12"
  location (X Y Z) 134.808 148.38 82.491, rotation 0 0 0; relative location -16.104 0 -4.8, rotation 0 0 0
  symmetric about XZ
  bounding box size 8.4 303.12 6.36
  Design: Length=8.4
  cross sections:
    n  XLocPercent  YLocPercent  ZLocPercent  shape
    0  0            0            0            point
    1  0.714286     0            0            circle Circle_Diameter=6.12
    2  1            0            0            circle Circle_Diameter=6.36
    3  1            0            0            point

Propeller "HL-Prop", child of "HL_Spinner"
  location (X Y Z) 140.808 148.38 82.491, rotation 0 0 0; relative location 6 0 0, rotation 0 0 0
  symmetric about XZ
  bounding box size 9.05057 303.886 7.01417
  Design: Diameter=22.674 NumBlade=5 Beta34=27.3508 UseBeta34Flag=0 Feather=0 Rotate=0 Precone=0 ReverseFlag=0 FoldAngle=95.8 PropMode=0 AF=88.8008 CLi=0 Chord=0.159309 Solidity=0.253548 ConstructXoC=0.5 FeatherAxisXoC=0.5 FeatherOffsetXoC=0
  cross sections:
    n  RadiusFrac  shape
    0  0.20238     airfoil file "MH 114  13.02%"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 BaseThickChord=0.130507 Chord=1.48231 ThickChord=0.130507
    1  1           airfoil file "MH 114  13.02%"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 BaseThickChord=0.130507 Chord=0.234789 ThickChord=0.130507
  blade curves as in "HL-Prop"

Fuselage "HL_Motor", child of "HL_Spinner"
  location (X Y Z) 143.208 148.38 82.491, rotation 0 0 0; relative location 0 0 0, rotation 0 0 0
  symmetric about XZ
  bounding box size 2.64 303.12 6.36
  Design: Length=2.64
  cross sections:
    n  XLocPercent  YLocPercent  ZLocPercent  shape
    0  0            0            0            point
    1  0            0            0            circle Circle_Diameter=6.36
    2  1            0            0            as above
    3  1            0            0            point

Fuselage "HL_Motor_Controller_Interface", child of "HL_Motor"
  location (X Y Z) 145.848 148.38 82.491, rotation 0 0 0; relative location 0 0 0, rotation 0 0 0
  symmetric about XZ
  bounding box size 2.409 303.12 6.36
  Design: Length=2.409
  cross sections:
    n  XLocPercent  YLocPercent  ZLocPercent  shape
    0  0            0            0            point
    1  0            0            0            circle Circle_Diameter=6.36
    2  1            0            0            as above
    3  1            0            0            point

Fuselage "HLNacelle_12_Tail", child of "HL_Motor_Controller_Interface"
  location (X Y Z) 148.257 148.38 82.491, rotation 0 0 0; relative location 0 9.54001e-06 0, rotation 0 0 0
  symmetric about XZ
  bounding box size 21.5308 303.12 7.1576
  Design: Length=21.5002
  cross sections:
    n  XLocPercent  YLocPercent  ZLocPercent  shape
    0  0            0            0            point
    1  0            0            0            circle Circle_Diameter=6.36
    2  0.0697669    0            0            as above
    3  0.307817     0            0            as above
    4  0.995351     0            0.061127     ellipse Ellipse_Height=3.33 Ellipse_Width=0.25212
    5  1            0            0.061127     point

Stack "CruiseNacelle-Spinner", child of "Wing_Parent"
  location (X Y Z) 126.381 189.741 87.649, rotation 0 0 0; relative location -18.4682 189.741 0.958024, rotation 0 0 0
  symmetric about XZ
  bounding box size 14.961 389.779 10.2971
  cross sections:
    n  XDelta  YDelta  ZDelta  shape
    0  0       0       0       point
    1  5       0       0       circle Circle_Diameter=7.75
    2  9.961   0       0       circle Circle_Diameter=10.2971
    3  0       0       0       point

Stack "CruiseNacelle-Motor", child of "CruiseNacelle-Spinner"
  location (X Y Z) 139.847 189.741 87.649, rotation 0 0 0; relative location 13.466 0 0, rotation 0 0 0
  symmetric about XZ
  bounding box size 10.0286 393.523 14.0408
  cross sections:
    n  XDelta  YDelta  ZDelta  shape
    0  0       0       0       point
    1  0       0       0       circle Circle_Diameter=10.3154
    2  0       0       0       circle Circle_Diameter=12.4425
    3  2.971   0       0       circle Circle_Diameter=13.8
    4  7.0576  0       0       as above
    5  0       0       0       point

Stack "CruiseNacelle-Tail", child of "CruiseNacelle-Motor"
  location (X Y Z) 149.846 189.741 87.649, rotation 0 0 0; relative location 9.99888 5.5118e-05 0, rotation 0 0 0
  symmetric about XZ
  bounding box size 45.9972 393.282 13.8
  cross sections:
    n  XDelta   YDelta  ZDelta  shape
    0  0        0       0       point
    1  0        0       0       circle Circle_Diameter=13.8
    2  7.9176   0       0       as above
    3  23.6796  0       0       circle Circle_Diameter=8.11554
    4  14.4     0       0       circle Circle_Diameter=2.29116
    5  0        0       0       point

Wing "VG", child of "CruiseNacelle-Tail"
  location (X Y Z) 151.811 181.8 90.1757, rotation 0 -17 0; relative location 1.96512 -7.94106 2.5267, rotation 0 -17 0
  symmetric about XZ
  bounding box size 2.68382 367.6 0.863027
  totals: TotalSpan=4 TotalProjectedSpan=4 TotalChord=2 TotalArea=8 TotalAR=2
  root: chord 1.2, twist 0, NACA 63-series A=0 IdealCl=0 Invert=1 ThickChord=0.1
  sections:
    n  Span  Root_Chord  Tip_Chord  Area  Sweep  Sweep_Location  Dihedral  Twist  Twist_Location  tip airfoil
    1  2     1.2         2.8        4     0      0.25            0         0      0.25            as above

Propeller "Cruise-Prop", child of "CruiseNacelle-Spinner"
  location (X Y Z) 138.113 189.741 87.649, rotation 0 0 0; relative location 11.7323 0 0, rotation 0 0 0
  symmetric about XZ
  bounding box size 3.19478 432.592 46.6838
  Design: Diameter=60 NumBlade=3 Beta34=31 UseBeta34Flag=1 Feather=13.9645 Rotate=-30 Precone=0 ReverseFlag=0 FoldAngle=0 PropMode=0 AF=102.562 CLi=0 Chord=0.127709 Solidity=0.121953 ConstructXoC=0.5 FeatherAxisXoC=0.5 FeatherOffsetXoC=0
  cross sections:
    n   RadiusFrac  shape
    0   0.1         circle Circle_Diameter=2.631
    1   0.1671      as above
    2   0.2495      airfoil file "CruiseProp__slice1"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 BaseThickChord=0.540645 Chord=3.144 ThickChord=0.540645
    3   0.3318      airfoil file "CruiseProp__slice2"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 BaseThickChord=0.359517 Chord=3.63 ThickChord=0.359517
    4   0.4142      airfoil file "CruiseProp__slice3"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 BaseThickChord=0.266259 Chord=4.059 ThickChord=0.266259
    5   0.4966      airfoil file "CruiseProp__slice4"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 BaseThickChord=0.203935 Chord=4.359 ThickChord=0.203935
    6   0.579       airfoil file "CruiseProp__slice5"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 BaseThickChord=0.166562 Chord=4.527 ThickChord=0.166562
    7   0.6613      airfoil file "CruiseProp__slice6"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 BaseThickChord=0.138653 Chord=4.539 ThickChord=0.138653
    8   0.7437      airfoil file "CruiseProp__slice7"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 BaseThickChord=0.118688 Chord=4.371 ThickChord=0.118688
    9   0.8261      airfoil file "CruiseProp__slice8"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 BaseThickChord=0.103285 Chord=4.086 ThickChord=0.103285
    10  0.9084      airfoil file "CruiseProp__slice9"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 BaseThickChord=0.0930766 Chord=3.687 ThickChord=0.0930766
    11  1           airfoil file "CruiseProp__slice10"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 BaseThickChord=0.0862661 Chord=3.162 ThickChord=0.0862661
  Chord along r/R (PCHIP): 0.1: 0.0877, 0.1671: 0.0877, 0.2495: 0.1048, 0.3318: 0.121, 0.4142: 0.1353, 0.4966: 0.1453, 0.579: 0.1509, 0.6613: 0.1513, 0.7437: 0.1457, 0.8261: 0.1362, 0.9084: 0.1229, 1: 0.1054
  Twist along r/R (PCHIP): 0.1: 65, 0.1671: 55.52, 0.2495: 44.9742, 0.3318: 39.1854, 0.4142: 33.1644, 0.4966: 28.3449, 0.579: 24.1187, 0.6613: 20.3517, 0.7437: 17.2544, 0.8261: 14.5788, 0.9084: 12.1193, 1: 10.4549
  Rake along r/R (PCHIP): 0.1: 0, 0.1671: 0.00178754, 0.2495: 0.0027, 0.3318: 0.0022, 0.4142: 0.0016, 0.4966: 0, 0.579: -0.0009, 0.6613: -0.0007, 0.7437: 0.0003, 0.8261: 0.0017, 0.9084: 0.0034, 1: 0.0053
  Skew along r/R (PCHIP): 0.1: 0, 0.1671: 0, 0.2495: 0.0002, 0.3318: -0.0004, 0.4142: -0.0035, 0.4966: -0.0075, 0.579: -0.01, 0.6613: -0.0102, 0.7437: -0.0076, 0.8261: -0.0031, 0.9084: 0.0038, 1: 0.014
  Thick along r/R (linear): 0.1: 1, 0.1671: 1, 0.2495: 0.540645, 0.3318: 0.359517, 0.4142: 0.266259, 0.4966: 0.203935, 0.579: 0.166562, 0.6613: 0.138653, 0.7437: 0.118688, 0.8261: 0.103285, 0.9084: 0.0930766, 1: 0.0862661

Blank "WingLE_Marker", child of "Wing_Parent"
  location (X Y Z) 144.849 0 86.691, rotation 0 0 0; relative location 0 0 0, rotation 0 0 0
