OpenVSP model (file version 5), 6 components.
Geometry view with OpenVSP parameter names; values to 6 digits, angles in degrees, lengths in the model's unit.
Overall bounding box: X_Min=0 X_Len=10 Y_Min=-5.98153 Y_Len=11.9631 Z_Min=-0.697092 Z_Len=2.69709

Pod "Pod"
  location (X Y Z) 0 0 0, rotation 0 0 0
  bounding box size 10 1.33333 1.33333
  Design: FineRatio=15 Length=10

Pod "Canopy", child of "Pod"
  location (X Y Z) 0.238095 0 0.133929, rotation 0 -6.90476 0
  bounding box size 3.97099 0.8 1.03883
  Design: FineRatio=10 Length=4

Wing "Wing", child of "Pod"
  location (X Y Z) 2 0 -0.25, rotation 0 0 0
  symmetric about XZ
  bounding box size 4.46241 11.9631 0.759325
  totals: TotalSpan=12 TotalProjectedSpan=11.9543 TotalChord=2 TotalArea=24 TotalAR=5.95442
  root: chord 3, twist 4, NACA 4-series Camber=0 CamberLoc=0.2 ThickChord=0.1
  sections:
    n  Span  Root_Chord  Tip_Chord  Area  Sweep  Sweep_Location  Dihedral  Twist  Twist_Location  tip airfoil
    1  6     3           1          12    30     0               5         0      0.25            as above

Pod "Payload", child of "Wing"
  location (X Y Z) 3.47755 2.54765 -0.497092, rotation 0 0 0; relative location 0 0 -0.5, rotation 0 0 0
  symmetric about XZ
  bounding box size 3 5.49529 0.4
  Design: FineRatio=15 Length=3

Wing "HTail", child of "Pod"
  location (X Y Z) 7 0 0, rotation 0 0 0
  symmetric about XZ
  bounding box size 2.1547 4 0.200116
  totals: TotalSpan=4 TotalProjectedSpan=4 TotalChord=1.5 TotalArea=6 TotalAR=2.66667
  root: chord 2, twist 0, NACA 4-series Camber=0 CamberLoc=0.2 ThickChord=0.1
  sections:
    n  Span  Root_Chord  Tip_Chord  Area  Sweep  Sweep_Location  Dihedral  Twist  Twist_Location  tip airfoil
    1  2     2           1          3     30     0               0         0      0.25            as above

Wing "VTail", child of "Pod"
  location (X Y Z) 7 0 0, rotation 0 0 0
  bounding box size 2.1547 0.200116 2
  totals: TotalSpan=2 TotalProjectedSpan=1e-06 TotalChord=1.5 TotalArea=3 TotalAR=0
  root: chord 2, twist 0, NACA 4-series Camber=0 CamberLoc=0.2 ThickChord=0.1
  sections:
    n  Span  Root_Chord  Tip_Chord  Area  Sweep  Sweep_Location  Dihedral  Twist  Twist_Location  tip airfoil
    1  2     2           1          3     30     0               90        0      0.25            as above
