OpenVSP model (file version 5), 1 components.
Geometry view with OpenVSP parameter names; values to 6 digits, angles in degrees, lengths in the model's unit.
Overall bounding box: X_Min=0 X_Len=8.8877 Y_Min=-4.01472 Y_Len=8.02944 Z_Min=-2.46622 Z_Len=4.93243

Stack "StackGeom"
  location (X Y Z) 0 0 0, rotation 0 0 0
  bounding box size 8.8877 8.02944 4.93243
  cross sections:
    n  XDelta    YDelta  ZDelta  shape
    0  0         0       0       point
    1  3.78689   0       0       ellipse Ellipse_Height=3.21914 Ellipse_Width=4.91892
    2  2         0       0       rounded rectangle RoundRectXSec_Radius=0.2 RoundRect_Keystone=0.7 RoundedRect_Height=4.93243 RoundedRect_Width=5.9027
    3  -1.21311  0       0       ellipse Ellipse_Height=2.5 Ellipse_Width=3
    4  3.78689   0       0       as above
    5  0.5       0       0       point
