OpenVSP model (file version 5), 5 components.
Geometry view with OpenVSP parameter names; values to 6 digits, angles in degrees, lengths in the model's unit.
Overall bounding box: X_Min=0 X_Len=10 Y_Min=-5.98153 Y_Len=11.9631 Z_Min=-0.898548 Z_Len=2.89855

Pod "Pod"
  location (X Y Z) 0 0 0, rotation 0 0 0
  bounding box size 10 1.33333 1.33333
  Design: FineRatio=15 Length=10

Wing "Wing", child of "Pod"
  location (X Y Z) 2 0 -0.25, rotation 0 0 0
  symmetric about XZ
  bounding box size 4.46241 11.9631 0.759325
  totals: TotalSpan=12 TotalProjectedSpan=11.9543 TotalChord=2 TotalArea=24 TotalAR=5.95442
  root: chord 3, twist 4, NACA 4-series Camber=0 CamberLoc=0.2 ThickChord=0.1
  sections:
    n  Span  Root_Chord  Tip_Chord  Area  Sweep  Sweep_Location  Dihedral  Twist  Twist_Location  tip airfoil
    1  6     3           1          12    30     0               5         0      0.25            as above

Wing "HTail", child of "Pod"
  location (X Y Z) 7 0 0, rotation 0 0 0
  symmetric about XZ
  bounding box size 2.1547 4 0.200116
  totals: TotalSpan=4 TotalProjectedSpan=4 TotalChord=1.5 TotalArea=6 TotalAR=2.66667
  root: chord 2, twist 0, NACA 4-series Camber=0 CamberLoc=0.2 ThickChord=0.1
  sections:
    n  Span  Root_Chord  Tip_Chord  Area  Sweep  Sweep_Location  Dihedral  Twist  Twist_Location  tip airfoil
    1  2     2           1          3     30     0               0         0      0.25            as above

Wing "VTail", child of "Pod"
  location (X Y Z) 7 0 0, rotation 0 0 0
  bounding box size 2.1547 0.200116 2
  totals: TotalSpan=2 TotalProjectedSpan=1e-06 TotalChord=1.5 TotalArea=3 TotalAR=0
  root: chord 2, twist 0, NACA 4-series Camber=0 CamberLoc=0.2 ThickChord=0.1
  sections:
    n  Span  Root_Chord  Tip_Chord  Area  Sweep  Sweep_Location  Dihedral  Twist  Twist_Location  tip airfoil
    1  2     2           1          3     30     0               90        0      0.25            as above

Propeller "PropGeom"
  location (X Y Z) 2.67857 3 0, rotation 0 0 0
  symmetric about XZ
  bounding box size 0.0993939 8.0036 1.7971
  Design: Diameter=2 NumBlade=3 Beta34=20 UseBeta34Flag=1 Feather=0 Rotate=0 Precone=0 ReverseFlag=0 FoldAngle=0 PropMode=0 AF=151.538 CLi=0.538798 Chord=0.177656 Solidity=0.169649 ConstructXoC=0.5 FeatherAxisXoC=0.5 FeatherOffsetXoC=0
  cross sections:
    n  RadiusFrac  shape
    0  0.2         ellipse Ellipse_Height=0.04 Ellipse_Width=0.08
    1  0.4         NACA 16-series Chord=0.16625 IdealCl=0.7 ThickChord=0.144074
    2  1           NACA 16-series Chord=0.13 IdealCl=0.2 ThickChord=0.03
  Chord along r/R (cubic Bezier): 0.2: 0.08, 0.333333: 0.15, 0.466667: 0.2, 0.6: 0.2, 0.716667: 0.2, 0.833333: 0.2, 0.95: 0.2, 0.966667: 0.2, 0.983333: 0.2, 1: 0.13
  Twist along r/R (PCHIP): 0.2: 46.75, 0.75: 20, 1: 13
  Thick along r/R (cubic Bezier): 0.2: 0.5, 0.233333: 0.3, 0.266667: 0.225, 0.3: 0.2, 0.4: 0.125, 0.5: 0.115, 0.6: 0.1, 0.733333: 0.075, 0.866667: 0.055, 1: 0.03
  CLI along r/R (cubic Bezier): 0.2: 0, 0.266667: 0.7, 0.333333: 0.7, 0.4: 0.7, 0.466667: 0.7, 0.533333: 0.7, 0.6: 0.7, 0.733333: 0.7, 0.866667: 0.7, 1: 0.2
