OpenVSP model (file version 5), 4 components.
Geometry view with OpenVSP parameter names; values to 6 digits, angles in degrees, lengths in the model's unit.
Overall bounding box: X_Min=0 X_Len=30 Y_Min=-9 Y_Len=18 Z_Min=-1.5 Z_Len=6.81689

Fuselage "orig_fuse"
  location (X Y Z) 0 0 0, rotation 0 0 0
  bounding box size 30 3.825 3
  Design: Length=30
  cross sections:
    n  XLocPercent  YLocPercent  ZLocPercent  shape
    0  0            0            0            point
    1  0.25         0            0            ellipse Ellipse_Height=3 Ellipse_Width=2.5
    2  0.5          0            0            rounded rectangle RoundRectXSec_Radius=0.695455 RoundedRect_Height=2.75 RoundedRect_Width=3.825
    3  0.75         0            0            super ellipse Super_Height=2.5 Super_M=0.265455 Super_MaxWidthLoc=0 Super_N=2 Super_Width=2.5
    4  1            0            0            point

Fuselage "conv_fuse", child of "orig_fuse"
  location (X Y Z) 0 0 0, rotation 0 0 0
  bounding box size 30 3.825 3
  Design: Length=30
  cross sections:
    n  XLocPercent  YLocPercent  ZLocPercent  shape
    0  0            0            0            point
    1  0.25         0            0            ellipse Ellipse_Height=3 Ellipse_Width=2.5
    2  0.5          0            0            rounded rectangle RoundRectXSec_Radius=0.695455 RoundedRect_Height=2.75 RoundedRect_Width=3.825
    3  0.75         0            0            super ellipse Super_Height=2.5 Super_M=0.265455 Super_MaxWidthLoc=0 Super_N=2 Super_Width=2.5
    4  1            0            0            point

Wing "orig_wing"
  location (X Y Z) 10 0 5, rotation 0 0 0
  symmetric about XZ
  bounding box size 6.19652 18 0.486388
  totals: TotalSpan=18 TotalProjectedSpan=18 TotalChord=2.5 TotalArea=45 TotalAR=7.2
  root: chord 4, twist 0, NACA 4-series Camber=0.02 CamberLoc=0.4 ThickChord=0.12
  sections:
    n  Span  Root_Chord  Tip_Chord  Area    Sweep  Sweep_Location  Dihedral  Twist  Twist_Location  tip airfoil
    1  4.5   4           2.5        14.625  30     0               0         0      0.25            NACA 63-series A=0.8 IdealCl=0.3 ThickChord=0.12
    2  4.5   2.5         1          7.875   30     0               0         0      0.25            wedge DuLow=0.1 DuUp=0.1 FlatLow=0.333333 FlatUp=0.333333 SymmThick=1 ThickChord=0.1 ThickLoc=0.333333 ThickLocLow=0.333333 UForeLow=0.25 UForeUp=0.75 ZCamber=0

Wing "conv_wing", child of "orig_wing"
  location (X Y Z) 10 0 5, rotation 0 0 0
  symmetric about XZ
  bounding box size 6.19652 18 0.486388
  totals: TotalSpan=18 TotalProjectedSpan=18 TotalChord=2.5 TotalArea=45 TotalAR=7.2
  root: chord 4, twist 0, NACA 4-series Camber=0.02 CamberLoc=0.4 ThickChord=0.12
  sections:
    n  Span  Root_Chord  Tip_Chord  Area    Sweep  Sweep_Location  Dihedral  Twist  Twist_Location  tip airfoil
    1  4.5   4           2.5        14.625  30     0               0         0      0.25            NACA 63-series A=0.8 IdealCl=0.3 ThickChord=0.12
    2  4.5   2.5         1          7.875   30     0               0         0      0.25            wedge DuLow=0.1 DuUp=0.1 FlatLow=0.333333 FlatUp=0.333333 SymmThick=1 ThickChord=0.1 ThickLoc=0.333333 ThickLocLow=0.333333 UForeLow=0.25 UForeUp=0.75 ZCamber=0
