OpenVSP model (file version 5), 1 components.
Geometry view with OpenVSP parameter names; values to 6 digits, angles in degrees, lengths in the model's unit.
Overall bounding box: X_Min=0 X_Len=30 Y_Min=-1.91322 Y_Len=3.82643 Z_Min=-1.375 Z_Len=2.75

Fuselage "FuselageGeom"
  location (X Y Z) 0 0 0, rotation 0 0 0
  bounding box size 30 3.82643 2.75
  Design: Length=30
  cross sections:
    n  XLocPercent  YLocPercent  ZLocPercent  shape
    0  0            0            0            point
    1  0.25         0            0            edit curve Width=3.825 Height=2.75 AbsoluteFlag=0 SymType=0 cubic Bezier points (X Y): 0.5 0, 0.5 -0.0833333, 0.500426 -0.183208, 0.499992 -0.249406, 0.499559 -0.315605, 0.493599 -0.360762, 0.446747 -0.425929, 0.399894 -0.491097, 0.333333 -0.5, 0.25 -0.5, 0.166667 -0.5, 0.0833333 -0.5, 0 -0.5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
    2  0.5          0            0            edit curve Width=3.825 Height=2.75 AbsoluteFlag=0 SymType=0 linear points (X Y): 0.5 0, 0.5 -0.5, 0 -0.5, -0.5 -0.5, -0.5 0, -0.5 0.5, 0 0.5, 0.5 0.5, 0.5 0
    3  0.75         0            0            super ellipse Super_Height=2.5 Super_M=0.265455 Super_MaxWidthLoc=0 Super_N=2 Super_Width=2.5
    4  1            0            0            point
