OpenVSP model (file version 5), 1 components.
Geometry view with OpenVSP parameter names; values to 6 digits, angles in degrees, lengths in the model's unit.
Overall bounding box: X_Min=0 X_Len=1 Y_Min=-1.09151 Y_Len=2.16506 Z_Min=-1.03761 Z_Len=2.06624

Stack "StackGeom"
  location (X Y Z) 0 0 0, rotation 0 0 0
  bounding box size 1 2.16506 2.06624
  cross sections:
    n  Spin  XDelta  YDelta  ZDelta  shape
    0  0     0       0       0       circle Circle_Diameter=0.272277
    1  0.05  1       0       0       edit curve Width=2.18602 Height=2.18602 AbsoluteFlag=0 SymType=0 linear points (X Y): 0.491096 0.117123, 0.186986 -0.108904, 0.310274 -0.470548, 0.00205479 -0.256849, -0.310274 -0.474658, -0.191096 -0.113014, -0.499315 0.108904, -0.113014 0.100685, -0.00205479 0.470548, 0.113014 0.113014, 0.491096 0.117123
