OpenVSP model (file version 5), 4 components.
Geometry view with OpenVSP parameter names; values to 6 digits, angles in degrees, lengths in the model's unit.
Overall bounding box: X_Min=0 X_Len=40 Y_Min=-20 Y_Len=40 Z_Min=-2.66667 Z_Len=9.66667

Custom "TransportFuse"
  location (X Y Z) 0 0 0, rotation 0 0 0
  bounding box size 40 5 5.16667
  Design: AftCenter=0.3 AftHeight=0.3 AftMult=3 AftWidth=0.1 Diameter=5 Length=40 NoseCenter=-0.2 NoseMult=1.5
  custom script TransportFuse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

Wing "Vert", child of "TransportFuse"
  location (X Y Z) 34.0761 0 1, rotation 90 0 0; relative location -5.92391 -2.63999e-06 -0.5, rotation 90 0 0
  bounding box size 5.4641 0.500194 6
  totals: TotalSpan=6 TotalProjectedSpan=6 TotalChord=3.5 TotalArea=21 TotalAR=1.71429
  root: chord 5, twist 0, NACA 4-series Camber=0 CamberLoc=0.2 ThickChord=0.1
  sections:
    n  Span  Root_Chord  Tip_Chord  Area  Sweep  Sweep_Location  Dihedral  Twist  Twist_Location  tip airfoil
    1  6     5           2          21    30     0               0         0      0.25            as above

Wing "Horz", child of "Vert"
  location (X Y Z) 34.0761 0 1, rotation 0 0 0; relative location 0 0 0, rotation 0 0 0
  symmetric about XZ
  bounding box size 5.4641 12 0.500194
  totals: TotalSpan=12 TotalProjectedSpan=12 TotalChord=3.5 TotalArea=42 TotalAR=3.42857
  root: chord 5, twist 0, NACA 4-series Camber=0 CamberLoc=0.2 ThickChord=0.1
  sections:
    n  Span  Root_Chord  Tip_Chord  Area  Sweep  Sweep_Location  Dihedral  Twist  Twist_Location  tip airfoil
    1  6     5           2          21    30     0               0         0      0.25            as above

Wing "Wing"
  location (X Y Z) 15 0 -1, rotation 0 0 0
  symmetric about XZ
  bounding box size 12.0235 40 1.20284
  totals: TotalSpan=40 TotalProjectedSpan=40 TotalChord=6.5 TotalArea=260 TotalAR=6.15385
  root: chord 10, twist 4, NACA 4-series Camber=0.02 CamberLoc=0.35 ThickChord=0.1
  sections:
    n  Span  Root_Chord  Tip_Chord  Area  Sweep  Sweep_Location  Dihedral  Twist  Twist_Location  tip airfoil
    1  20    10          3          130   20     0.25            0         0      0.25            NACA 4-series Camber=0 CamberLoc=0.2 ThickChord=0.1

VSPAERO settings: Sref=325 bref=50 cref=6.5 Xcg=0 Ycg=0 Zcg=0 AlphaStart=2 AlphaEnd=10 AlphaNpts=1 BetaStart=0 BetaEnd=0 BetaNpts=1 MachStart=0.75 MachEnd=0 MachNpts=1 ReCref=1e+07 Vinf=100 Rho=0.002377
