OpenVSP model (file version 5), 3 components.
Geometry view with OpenVSP parameter names; values to 6 digits, angles in degrees, lengths in the model's unit.
Overall bounding box: X_Min=-8.78931 X_Len=47.7975 Y_Min=-17.287 Y_Len=34.574 Z_Min=-2.86461 Z_Len=13.4179

Fuselage "FuselageGeom"
  location (X Y Z) -8.78689 0 0, rotation 0 0 0
  bounding box size 44.0024 3.98498 6.98261
  Design: Length=44
  cross sections:
    n  XLocPercent  YLocPercent  ZLocPercent  shape
    0  0            0            -0.0245902   circle Circle_Diameter=0.02
    1  0.163934     0            -0.002       general fuselage BotStr=1.16989 BotTanAngle=90 CornerRad=0 Height=3.97959 LowStr=0.83 MaxWidthLoc=-0.171429 TopStr=0.83 TopTanAngle=90 UpStr=0.169929 Width=2.42449
    2  0.26839      0            0.022        general fuselage BotStr=0.83 BotTanAngle=90 CornerRad=0 Height=6.3 LowStr=0.83 MaxWidthLoc=0 TopStr=0.41175 TopTanAngle=90 UpStr=0.83 Width=3.5
    3  0.350235     0            0.02         general fuselage BotStr=0.83 BotTanAngle=90 CornerRad=0 Height=6.05 LowStr=0.83 MaxWidthLoc=0 TopStr=0.41175 TopTanAngle=90 UpStr=0.83 Width=3.5
    4  0.441984     0            0.015        general fuselage BotStr=0.83 BotTanAngle=90 CornerRad=0 Height=6 LowStr=0.83 MaxWidthLoc=0 TopStr=0.83 TopTanAngle=90 UpStr=0.83 Width=3.5
    5  0.557116     0            0.015        general fuselage BotStr=0.83 BotTanAngle=90 CornerRad=0 Height=6 LowStr=0.83 MaxWidthLoc=0 TopStr=0.83 TopTanAngle=90 UpStr=0.83 Width=2.5
    6  0.796158     0            0.015        general fuselage BotStr=0.83 BotTanAngle=90 CornerRad=0 Height=6 LowStr=0.83 MaxWidthLoc=0 TopStr=0.83 TopTanAngle=90 UpStr=0.83 Width=3
    7  0.953893     0            0            general fuselage BotStr=0.83 BotTanAngle=90 CornerRad=0 Height=4.5 LowStr=0.83 MaxWidthLoc=0 TopStr=0.83 TopTanAngle=90 UpStr=0.83 Width=3.5
    8  1            0            0.005        circle Circle_Diameter=3.3

Wing "WingGeom"
  location (X Y Z) 5.45902 1.8 0, rotation 0 0 0
  symmetric about XZ
  bounding box size 30.5 34.574 2.13776
  totals: TotalSpan=30.6161 TotalProjectedSpan=30.6161 TotalChord=20.0125 TotalArea=563.719 TotalAR=1.66278 MAC=20.5973
  root: chord 30.5, twist 0, NACA 4-series Camber=0 CamberLoc=0.2 ThickChord=0.07
  sections:
    n  Span     Root_Chord  Tip_Chord  Area     Sweep    Sweep_Location  Dihedral  Twist  Twist_Location  tip airfoil
    1  2.35     30.5        27.5       68.15    0        0               0         0      0.25            NACA 4-series Camber=0 CamberLoc=0.2 ThickChord=0.06
    2  1.49051  27.5        21.7       36.6667  52.5     0.29            0         0      0.25            NACA 4-series Camber=0 CamberLoc=0.2 ThickChord=0.05
    3  8.96751  21.7        12.6       153.793  52.9286  0               0         0      0.25            as above
    4  2.5      12.6        6          23.25    52.5     0.2             0         0      0.25            NACA 4-series Camber=0 CamberLoc=0.2 ThickChord=0.043

Wing "VT"
  location (X Y Z) 18.9016 0 0, rotation 90 0 0
  bounding box size 20.1068 1.5298 10.5533
  totals: TotalSpan=10.2139 TotalProjectedSpan=10.2139 TotalChord=9.01212 TotalArea=89.2674 TotalAR=1.16867 MAC=10.5179
  root: chord 15, twist 0, NACA 4-series Camber=0 CamberLoc=0.2 ThickChord=0.1
  sections:
    n  Span     Root_Chord  Tip_Chord  Area     Sweep  Sweep_Location  Dihedral  Twist  Twist_Location  tip airfoil
    1  4.62353  15          8.77821    54.9696  57     0.242857        0         0      0.25            as above
    2  5.59038  8.77821     3.49206    34.2977  55     0               0         0      0.25            as above
