OpenVSP model (file version 5), 5 components.
Geometry view with OpenVSP parameter names; values to 6 digits, angles in degrees, lengths in the model's unit.
Overall bounding box: X_Min=0.114754 X_Len=14.6153 Y_Min=-13.5798 Y_Len=27.1596 Z_Min=-1.67544 Z_Len=3.52205

Fuselage "FuselageGeom"
  location (X Y Z) 0.114754 0 0, rotation 0 0 0
  bounding box size 13 2.20669 3.52205
  Design: Length=13
  cross sections:
    n  XLocPercent  YLocPercent  ZLocPercent  shape
    0  0            0            -0.0655738   point
    1  0.31082      0            -0.0075      edit curve Width=2 Height=2.90351 AbsoluteFlag=0 SymType=1 cubic Bezier points (X Y): 0.503478 -0.105532, 0.503478 -0.381674, 0.281681 -0.5, 0 -0.5, -0.281681 -0.5, -0.503478 -0.381674, -0.503478 -0.105532, -0.503478 0.17061, -0.276142 0.316596, 0 0.316596, 0.276142 0.316596, 0.503478 0.17061, 0.503478 -0.105532
    2  0.469124     0            0.0163934    edit curve Width=2 Height=5.4 AbsoluteFlag=0 SymType=1 cubic Bezier points (X Y): 0.538349 0.03789, 0.56071 -0.0490707, 0.546924 -0.218923, 0.541954 -0.33073, 0.445055 -0.328245, 0.0965885 -0.33, 0 -0.33, -0.0965885 -0.33, -0.445055 -0.328245, -0.541954 -0.33073, -0.546924 -0.218923, -0.56071 -0.0490707, -0.538349 0.03789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
    3  0.841172     0            0.00819672   edit curve Width=1.8 Height=5.4 AbsoluteFlag=0 SymType=1 cubic Bezier points (X Y): 0.538349 0.03789, 0.56071 -0.0490707, 0.546924 -0.218923, 0.541954 -0.33073, 0.445055 -0.328245, 0.0965885 -0.33, 0 -0.33, -0.0965885 -0.33, -0.445055 -0.328245, -0.541954 -0.33073, -0.546924 -0.218923, -0.56071 -0.0490707, -0.538349 0.03789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
    4  1            0            0.00819672   edit curve Width=1.5 Height=3 AbsoluteFlag=0 SymType=1 cubic Bezier points (X Y): 0.623248 -0.105969, 0.592196 -0.270263, 0.276142 -0.278478, 0 -0.278478, -0.276142 -0.278478, -0.592196 -0.270263, -0.623248 -0.105969, -0.623248 0.170173, -0.276142 0.189759, 0 0.189759, 0.276142 0.189759, 0.623248 0.170173, 0.623248 -0.105969

Wing "MainWing"
  location (X Y Z) 4.31721 1 0, rotation 0 0 0
  symmetric about XZ
  bounding box size 10.4129 27.1596 0.720581
  totals: TotalSpan=24.9 TotalProjectedSpan=24.9 TotalChord=4.7 TotalArea=81.295 TotalAR=7.62667 MAC=3.94761
  root: chord 8, twist 0, NACA 4-series Camber=0 CamberLoc=0.2 ThickChord=0.08
  sections:
    n  Span  Root_Chord  Tip_Chord  Area     Sweep  Sweep_Location  Dihedral  Twist  Twist_Location  tip airfoil
    1  0.9   8           6          6.3      0      1               0         0      0.25            NACA 4-series Camber=0 CamberLoc=0.2 DeltaY=0.00714286 ThickChord=0.11
    2  2.75  6           3.3        12.7875  10     1               0         0      0.25            CST airfoil ContLERad=1 LowDegree=7 ThickChord=0.174942 UpDegree=7 Au=[0.216419 0.536739 0.139067 0.296159 0.557222 -0.0854345 0.468309 0.292188] Al=[-0.216419 0.0793656 -0.51419 0.317542 -0.523056 0.101872 -0.100122 -0.0999712]
    3  8.8   3.3         1.6        21.56    20     0.25            0         0      0.25            as above

Wing "Canard"
  location (X Y Z) 1.9 0.5 0, rotation 0 0 0
  symmetric about XZ
  bounding box size 1.08335 12.9961 0.13089
  totals: TotalSpan=11.8 TotalProjectedSpan=11.8 TotalChord=1.08333 TotalArea=12.7833 TotalAR=10.8923 MAC=1.08333
  root: chord 1.08333, twist 0, airfoil file "RONCZ LOW DRAG FLYING WING AIRFOIL"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 BaseThickChord=0.120643 ThickChord=0.120643
  sections:
    n  Span  Root_Chord  Tip_Chord  Area     Sweep  Sweep_Location  Dihedral  Twist  Twist_Location  tip airfoil
    1  5.9   1.08333     1.08334    6.39167  0      0               0         0      0.25            as above

Human "Pilot"
  location (X Y Z) 5.65217 0 -0.652174, rotation 0 30 0
  bounding box size 3.87752 1.73365 3.07181
  mass: Density=70.3421 Shell_Flag=0 Mass_Area=1 Mass_Prior=0
  Anthropometric: Age=30 AutoDensity=1 BMI=27.7 BMI_pct=0.5 GenderFlag=0 LenUnit=4 Mass=188.306 MassUnit=3 SitFrac=0.51 Stature=5.76115 Stature_pct=0.5 Volume=2.677

Human "Passenger"
  location (X Y Z) 9.78261 0 -0.652174, rotation 0 30 0
  bounding box size 3.87752 1.73365 3.07181
  mass: Density=70.3421 Shell_Flag=0 Mass_Area=1 Mass_Prior=0
  Anthropometric: Age=30 AutoDensity=1 BMI=27.7 BMI_pct=0.5 GenderFlag=0 LenUnit=4 Mass=188.306 MassUnit=3 SitFrac=0.51 Stature=5.76115 Stature_pct=0.5 Volume=2.677

VSPAERO settings (reference component "MainWing"): Sref=81.295 bref=24.9 cref=3.94761 Xcg=0 Ycg=0 Zcg=0 AlphaStart=-5 AlphaEnd=25 AlphaNpts=30 BetaStart=0 BetaEnd=0 BetaNpts=1 MachStart=0.2 MachEnd=0 MachNpts=1 ReCref=1e+07 Vinf=100 Rho=0.002377
