OpenVSP model (file version 5), 5 components.
Geometry view with OpenVSP parameter names; values to 6 digits, angles in degrees, lengths in the model's unit.
Overall bounding box: X_Min=0 X_Len=49.3948 Y_Min=-12.3793 Y_Len=24.7586 Z_Min=-1.5 Z_Len=3

Wing "Canard"
  location (X Y Z) 18.2787 3.1 0, rotation 0 0 0
  symmetric about XZ
  bounding box size 6.4 12.6075 0.640371
  totals: TotalSpan=6.40748 TotalProjectedSpan=6.40748 TotalChord=4.2 TotalArea=26.9114 TotalAR=1.52559 MAC=4.58413
  root: chord 6.4, twist 0, NACA 4-series Camber=0 CamberLoc=0.2 ThickChord=0.1
  sections:
    n  Span     Root_Chord  Tip_Chord  Area     Sweep  Sweep_Location  Dihedral  Twist  Twist_Location  tip airfoil
    1  3.20374  6.4         2          13.4557  33     0.2             0         0      0.25            as above

Wing "MainWing"
  location (X Y Z) 26 1.75 0, rotation 0 0 0
  symmetric about XZ
  bounding box size 20.3089 24.7586 0.700406
  totals: TotalSpan=21.2586 TotalProjectedSpan=21.2586 TotalChord=11.0638 TotalArea=163.465 TotalAR=2.76468 MAC=10.2011
  root: chord 18, twist 0, NACA 4-series Camber=0 CamberLoc=0.1 ThickChord=0.01
  sections:
    n  Span     Root_Chord  Tip_Chord  Area     Sweep  Sweep_Location  Dihedral  Twist  Twist_Location  tip airfoil
    1  1.6      18          17         28       30     0               0         0      0.25            as above
    2  0.1      17          9.4        1.32     30     0               0         0      0.25            as above
    3  1.61508  9.4         7          13.2437  30     0               0         0      0.25            NACA 4-series Camber=0 CamberLoc=0.2 ThickChord=0.1
    4  7.31422  7           3.71032    39.1688  -30    0               0         0      0.25            NACA 4-series Camber=0 CamberLoc=0.1 ThickChord=0.01

Wing "HT"
  location (X Y Z) 0 0 0, rotation 0 0 0
  symmetric about XZ
  bounding box size 6.19615 18 0.400232
  totals: TotalSpan=18 TotalProjectedSpan=18 TotalChord=2.5 TotalArea=45 TotalAR=7.2 MAC=2.8
  root: chord 4, twist 0, NACA 4-series Camber=0 CamberLoc=0.2 ThickChord=0.1
  sections:
    n  Span  Root_Chord  Tip_Chord  Area  Sweep  Sweep_Location  Dihedral  Twist  Twist_Location  tip airfoil
    1  9     4           1          22.5  30     0               0         0      0.25            as above

Wing "VT"
  location (X Y Z) 0 0 0, rotation 0 0 0
  symmetric about XZ
  bounding box size 6.19615 18 0.400232
  totals: TotalSpan=18 TotalProjectedSpan=18 TotalChord=2.5 TotalArea=45 TotalAR=7.2 MAC=2.8
  root: chord 4, twist 0, NACA 4-series Camber=0 CamberLoc=0.2 ThickChord=0.1
  sections:
    n  Span  Root_Chord  Tip_Chord  Area  Sweep  Sweep_Location  Dihedral  Twist  Twist_Location  tip airfoil
    1  9     4           1          22.5  30     0               0         0      0.25            as above

Fuselage "Fuselage"
  location (X Y Z) 1.31148 0 0, rotation 0 0 0
  bounding box size 48.0833 3 3
  Design: Length=48.0833
  cross sections:
    n  XLocPercent  YLocPercent  ZLocPercent  shape
    0  0            0            0            point
    1  0.152152     0            0            ellipse Ellipse_Height=2.5 Ellipse_Width=3
    2  0.206722     0            0            general fuselage BotStr=0.83 BotTanAngle=90 CornerRad=0 Height=3 LowStr=0.83 MaxWidthLoc=0 TopStr=0.83 TopTanAngle=90 UpStr=0.83 Width=3
    3  0.369576     0            0            ellipse Ellipse_Height=3 Ellipse_Width=3
    4  0.625        0            0            as above
    5  0.75         0            0            as above
    6  1            0            0            circle Circle_Diameter=1.5
